<neuroml xmlns="http://www.neuroml.org/schema/neuroml2"  xmlns:xs="http://www.w3.org/2001/XMLSchema" xmlns:xsi="http://www.w3.org/2001/XMLSchema-instance" xsi:schemaLocation="http://www.neuroml.org/schema/neuroml2 https://raw.github.com/NeuroML/NeuroML2/development/Schemas/NeuroML2/NeuroML_v2.3.1.xsd" id="Worm2D">
    <pulseGenerator id="pulseGen_0" delay="20s" duration="10s" amplitude="10.000000 pA"/>
    <pulseGenerator id="extStim" delay="0s" duration="10000s" amplitude="1 pA"/>
    <network id="Worm2DNet">
        <population id="PopDA" component="DA" size="10" type="populationList">
            <instance id="0">
                <location x="100.0" y="-100.0" z="0.0"/>
            </instance>
            <instance id="1">
                <location x="100.0" y="-100.0" z="100.0"/>
            </instance>
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        </population>
        <population id="PopDB" component="DB" size="10" type="populationList">
            <instance id="0">
                <location x="100.0" y="0.0" z="0.0"/>
            </instance>
            <instance id="1">
                <location x="100.0" y="0.0" z="100.0"/>
            </instance>
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        </population>
        <population id="PopDD" component="DD" size="10" type="populationList">
            <instance id="0">
                <location x="100.0" y="100.0" z="0.0"/>
            </instance>
            <instance id="1">
                <location x="100.0" y="100.0" z="100.0"/>
            </instance>
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        </population>
        <population id="PopVA" component="VA" size="10" type="populationList">
            <instance id="0">
                <location x="-100.0" y="-100.0" z="0.0"/>
            </instance>
            <instance id="1">
                <location x="-100.0" y="-100.0" z="100.0"/>
            </instance>
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        </population>
        <population id="PopVB" component="VB" size="10" type="populationList">
            <instance id="0">
                <location x="-100.0" y="0.0" z="0.0"/>
            </instance>
            <instance id="1">
                <location x="-100.0" y="0.0" z="100.0"/>
            </instance>
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        </population>
        <population id="PopVD" component="VD" size="10" type="populationList">
            <instance id="0">
                <location x="-100.0" y="100.0" z="0.0"/>
            </instance>
            <instance id="1">
                <location x="-100.0" y="100.0" z="100.0"/>
            </instance>
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        </population>
        <electricalProjection id="NC_PopDB_PopDB_gapJunction0" presynapticPopulation="PopDB" postsynapticPopulation="PopDB">
            <electricalConnectionInstanceW id="0" preCell="../PopDB/1/DB" postCell="../PopDB/0/DB" synapse="gapJunction0" weight="0.111893748558795"/>
            <electricalConnectionInstanceW id="1" preCell="../PopDB/0/DB" postCell="../PopDB/1/DB" synapse="gapJunction0" weight="0.111893748558795"/>
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        </electricalProjection>
        <electricalProjection id="NC_PopDD_PopDD_gapJunction0" presynapticPopulation="PopDD" postsynapticPopulation="PopDD">
            <electricalConnectionInstanceW id="0" preCell="../PopDD/1/DD" postCell="../PopDD/0/DD" synapse="gapJunction0" weight="1.626882458649384"/>
            <electricalConnectionInstanceW id="1" preCell="../PopDD/0/DD" postCell="../PopDD/1/DD" synapse="gapJunction0" weight="1.626882458649384"/>
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        </electricalProjection>
        <electricalProjection id="NC_PopVD_PopVD_gapJunction0" presynapticPopulation="PopVD" postsynapticPopulation="PopVD">
            <electricalConnectionInstanceW id="0" preCell="../PopVD/1/VD" postCell="../PopVD/0/VD" synapse="gapJunction0" weight="1.626882458649384"/>
            <electricalConnectionInstanceW id="1" preCell="../PopVD/0/VD" postCell="../PopVD/1/VD" synapse="gapJunction0" weight="1.626882458649384"/>
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        </electricalProjection>
        <electricalProjection id="NC_PopVB_PopVB_gapJunction0" presynapticPopulation="PopVB" postsynapticPopulation="PopVB">
            <electricalConnectionInstanceW id="0" preCell="../PopVB/1/VB" postCell="../PopVB/0/VB" synapse="gapJunction0" weight="0.111893748558795"/>
            <electricalConnectionInstanceW id="1" preCell="../PopVB/0/VB" postCell="../PopVB/1/VB" synapse="gapJunction0" weight="0.111893748558795"/>
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        </electricalProjection>
        <continuousProjection id="NC_PopDA_PopDA_silentSyn" presynapticPopulation="PopDA" postsynapticPopulation="PopDA">
            <continuousConnectionInstanceW id="0" preCell="../PopDA/0/DA" postCell="../PopDA/0/DA" preComponent="silentSyn" postComponent="neuron_to_neuron_syn_w2d" weight="-2.528311446261591"/>
            <continuousConnectionInstanceW id="1" preCell="../PopDA/1/DA" postCell="../PopDA/1/DA" preComponent="silentSyn" postComponent="neuron_to_neuron_syn_w2d" weight="-2.528311446261591"/>
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        </continuousProjection>
        <continuousProjection id="NC_PopDD_PopDA_silentSyn" presynapticPopulation="PopDD" postsynapticPopulation="PopDA">
            <continuousConnectionInstanceW id="0" preCell="../PopDD/0/DD" postCell="../PopDA/0/DA" preComponent="silentSyn" postComponent="neuron_to_neuron_syn_w2d" weight="-14.672044016483778"/>
            <continuousConnectionInstanceW id="1" preCell="../PopDD/1/DD" postCell="../PopDA/1/DA" preComponent="silentSyn" postComponent="neuron_to_neuron_syn_w2d" weight="-14.672044016483778"/>
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        </continuousProjection>
        <continuousProjection id="NC_PopDB_PopDB_silentSyn" presynapticPopulation="PopDB" postsynapticPopulation="PopDB">
            <continuousConnectionInstanceW id="0" preCell="../PopDB/0/DB" postCell="../PopDB/0/DB" preComponent="silentSyn" postComponent="neuron_to_neuron_syn_w2d" weight="-5.431573678563159"/>
            <continuousConnectionInstanceW id="1" preCell="../PopDB/1/DB" postCell="../PopDB/1/DB" preComponent="silentSyn" postComponent="neuron_to_neuron_syn_w2d" weight="-5.431573678563159"/>
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        </continuousProjection>
        <continuousProjection id="NC_PopDD_PopDB_silentSyn" presynapticPopulation="PopDD" postsynapticPopulation="PopDB">
            <continuousConnectionInstanceW id="0" preCell="../PopDD/0/DD" postCell="../PopDB/0/DB" preComponent="silentSyn" postComponent="neuron_to_neuron_syn_w2d" weight="-1.110075444163887"/>
            <continuousConnectionInstanceW id="1" preCell="../PopDD/1/DD" postCell="../PopDB/1/DB" preComponent="silentSyn" postComponent="neuron_to_neuron_syn_w2d" weight="-1.110075444163887"/>
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        </continuousProjection>
        <continuousProjection id="NC_PopDD_PopDD_silentSyn" presynapticPopulation="PopDD" postsynapticPopulation="PopDD">
            <continuousConnectionInstanceW id="0" preCell="../PopDD/0/DD" postCell="../PopDD/0/DD" preComponent="silentSyn" postComponent="neuron_to_neuron_syn_w2d" weight="0.43417780432587"/>
            <continuousConnectionInstanceW id="1" preCell="../PopDD/1/DD" postCell="../PopDD/1/DD" preComponent="silentSyn" postComponent="neuron_to_neuron_syn_w2d" weight="0.43417780432587"/>
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        </continuousProjection>
        <continuousProjection id="NC_PopVA_PopDD_silentSyn" presynapticPopulation="PopVA" postsynapticPopulation="PopDD">
            <continuousConnectionInstanceW id="0" preCell="../PopVA/0/VA" postCell="../PopDD/0/DD" preComponent="silentSyn" postComponent="neuron_to_neuron_syn_w2d" weight="1.688431247680192"/>
            <continuousConnectionInstanceW id="1" preCell="../PopVA/1/VA" postCell="../PopDD/1/DD" preComponent="silentSyn" postComponent="neuron_to_neuron_syn_w2d" weight="1.688431247680192"/>
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        </continuousProjection>
        <continuousProjection id="NC_PopVB_PopDD_silentSyn" presynapticPopulation="PopVB" postsynapticPopulation="PopDD">
            <continuousConnectionInstanceW id="0" preCell="../PopVB/0/VB" postCell="../PopDD/0/DD" preComponent="silentSyn" postComponent="neuron_to_neuron_syn_w2d" weight="5.038926703654519"/>
            <continuousConnectionInstanceW id="1" preCell="../PopVB/1/VB" postCell="../PopDD/1/DD" preComponent="silentSyn" postComponent="neuron_to_neuron_syn_w2d" weight="5.038926703654519"/>
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        </continuousProjection>
        <continuousProjection id="NC_PopVD_PopVD_silentSyn" presynapticPopulation="PopVD" postsynapticPopulation="PopVD">
            <continuousConnectionInstanceW id="0" preCell="../PopVD/0/VD" postCell="../PopVD/0/VD" preComponent="silentSyn" postComponent="neuron_to_neuron_syn_w2d" weight="0.43417780432587"/>
            <continuousConnectionInstanceW id="1" preCell="../PopVD/1/VD" postCell="../PopVD/1/VD" preComponent="silentSyn" postComponent="neuron_to_neuron_syn_w2d" weight="0.43417780432587"/>
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        </continuousProjection>
        <continuousProjection id="NC_PopDA_PopVD_silentSyn" presynapticPopulation="PopDA" postsynapticPopulation="PopVD">
            <continuousConnectionInstanceW id="0" preCell="../PopDA/0/DA" postCell="../PopVD/0/VD" preComponent="silentSyn" postComponent="neuron_to_neuron_syn_w2d" weight="1.688431247680192"/>
            <continuousConnectionInstanceW id="1" preCell="../PopDA/1/DA" postCell="../PopVD/1/VD" preComponent="silentSyn" postComponent="neuron_to_neuron_syn_w2d" weight="1.688431247680192"/>
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        </continuousProjection>
        <continuousProjection id="NC_PopDB_PopVD_silentSyn" presynapticPopulation="PopDB" postsynapticPopulation="PopVD">
            <continuousConnectionInstanceW id="0" preCell="../PopDB/0/DB" postCell="../PopVD/0/VD" preComponent="silentSyn" postComponent="neuron_to_neuron_syn_w2d" weight="5.038926703654519"/>
            <continuousConnectionInstanceW id="1" preCell="../PopDB/1/DB" postCell="../PopVD/1/VD" preComponent="silentSyn" postComponent="neuron_to_neuron_syn_w2d" weight="5.038926703654519"/>
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        </continuousProjection>
        <continuousProjection id="NC_PopVA_PopVA_silentSyn" presynapticPopulation="PopVA" postsynapticPopulation="PopVA">
            <continuousConnectionInstanceW id="0" preCell="../PopVA/0/VA" postCell="../PopVA/0/VA" preComponent="silentSyn" postComponent="neuron_to_neuron_syn_w2d" weight="-2.528311446261591"/>
            <continuousConnectionInstanceW id="1" preCell="../PopVA/1/VA" postCell="../PopVA/1/VA" preComponent="silentSyn" postComponent="neuron_to_neuron_syn_w2d" weight="-2.528311446261591"/>
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        </continuousProjection>
        <continuousProjection id="NC_PopVD_PopVA_silentSyn" presynapticPopulation="PopVD" postsynapticPopulation="PopVA">
            <continuousConnectionInstanceW id="0" preCell="../PopVD/0/VD" postCell="../PopVA/0/VA" preComponent="silentSyn" postComponent="neuron_to_neuron_syn_w2d" weight="-14.672044016483778"/>
            <continuousConnectionInstanceW id="1" preCell="../PopVD/1/VD" postCell="../PopVA/1/VA" preComponent="silentSyn" postComponent="neuron_to_neuron_syn_w2d" weight="-14.672044016483778"/>
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        </continuousProjection>
        <continuousProjection id="NC_PopVB_PopVB_silentSyn" presynapticPopulation="PopVB" postsynapticPopulation="PopVB">
            <continuousConnectionInstanceW id="0" preCell="../PopVB/0/VB" postCell="../PopVB/0/VB" preComponent="silentSyn" postComponent="neuron_to_neuron_syn_w2d" weight="-5.431573678563159"/>
            <continuousConnectionInstanceW id="1" preCell="../PopVB/1/VB" postCell="../PopVB/1/VB" preComponent="silentSyn" postComponent="neuron_to_neuron_syn_w2d" weight="-5.431573678563159"/>
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        </continuousProjection>
        <continuousProjection id="NC_PopVD_PopVB_silentSyn" presynapticPopulation="PopVD" postsynapticPopulation="PopVB">
            <continuousConnectionInstanceW id="0" preCell="../PopVD/0/VD" postCell="../PopVB/0/VB" preComponent="silentSyn" postComponent="neuron_to_neuron_syn_w2d" weight="-1.110075444163887"/>
            <continuousConnectionInstanceW id="1" preCell="../PopVD/1/VD" postCell="../PopVB/1/VB" preComponent="silentSyn" postComponent="neuron_to_neuron_syn_w2d" weight="-1.110075444163887"/>
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        </continuousProjection>
        <inputList id="OneStim" population="PopDA" component="pulseGen_0">
            <inputW id="0" target="../PopDA/0/DA" destination="synapses" weight="1.0"/>
        </inputList>
        <inputList id="ExtStimPopDA" population="PopDA" component="extStim">
            <inputW id="0" target="../PopDA/0/DA" destination="synapses" weight="0.0"/>
            <inputW id="1" target="../PopDA/1/DA" destination="synapses" weight="0.0"/>
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        </inputList>
        <inputList id="ExtStimPopDB" population="PopDB" component="extStim">
            <inputW id="0" target="../PopDB/0/DB" destination="synapses" weight="0.0"/>
            <inputW id="1" target="../PopDB/1/DB" destination="synapses" weight="0.0"/>
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        </inputList>
        <inputList id="ExtStimPopDD" population="PopDD" component="extStim">
            <inputW id="0" target="../PopDD/0/DD" destination="synapses" weight="0.0"/>
            <inputW id="1" target="../PopDD/1/DD" destination="synapses" weight="0.0"/>
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        </inputList>
        <inputList id="ExtStimPopVA" population="PopVA" component="extStim">
            <inputW id="0" target="../PopVA/0/VA" destination="synapses" weight="0.0"/>
            <inputW id="1" target="../PopVA/1/VA" destination="synapses" weight="0.0"/>
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        </inputList>
        <inputList id="ExtStimPopVB" population="PopVB" component="extStim">
            <inputW id="0" target="../PopVB/0/VB" destination="synapses" weight="0.0"/>
            <inputW id="1" target="../PopVB/1/VB" destination="synapses" weight="0.0"/>
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        </inputList>
        <inputList id="ExtStimPopVD" population="PopVD" component="extStim">
            <inputW id="0" target="../PopVD/0/VD" destination="synapses" weight="0.0"/>
            <inputW id="1" target="../PopVD/1/VD" destination="synapses" weight="0.0"/>
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        </inputList>
    </network>
</neuroml>
