<Lems>

    <!--

        This LEMS file has been automatically generated using PyNeuroML v1.3.17 (libNeuroML v0.6.5)

     -->

    <!-- Specify which component to run -->
    <Target component="Worm2D" reportFile="report.txt"/>

    <!-- Include core NeuroML2 ComponentType definitions -->
    <Include file="Cells.xml"/>
    <Include file="Networks.xml"/>
    <Include file="Simulation.xml"/>

    <Include file="cell_syn_W2D.xml"/>
    <Include file="cell_syn_W2D_cells.xml"/>
    <Include file="Worm2D.net.nml"/>

    <Simulation id="Worm2D" length="50000.0ms" step="1.0ms" target="Worm2DNet" seed="12345">  <!-- Note seed: ensures same random numbers used every run -->
        <Display id="display0" title="States" timeScale="1ms" xmin="-5000.0" xmax="55000.00000000001" ymin="-15" ymax="10">
            <Line id="DA_0_DA" quantity="PopDA/0/DA/state" scale="1" color="#F0F8FF" timeScale="1ms"/>
            <Line id="DB_0_DB" quantity="PopDB/0/DB/state" scale="1" color="#FAEBD7" timeScale="1ms"/>
            <Line id="DD_0_DD" quantity="PopDD/0/DD/state" scale="1" color="#00FFFF" timeScale="1ms"/>
            <Line id="VD_0_VD" quantity="PopVD/0/VD/state" scale="1" color="#7FFFD4" timeScale="1ms"/>
            <Line id="VA_0_VA" quantity="PopVA/0/VA/state" scale="1" color="#F0FFFF" timeScale="1ms"/>
            <Line id="VB_0_VB" quantity="PopVB/0/VB/state" scale="1" color="#F5F5DC" timeScale="1ms"/>
            <Line id="DA_1_DA" quantity="PopDA/1/DA/state" scale="1" color="#FFE4C4" timeScale="1ms"/>
            <Line id="DB_1_DB" quantity="PopDB/1/DB/state" scale="1" color="#000000" timeScale="1ms"/>
            <Line id="DD_1_DD" quantity="PopDD/1/DD/state" scale="1" color="#FFEBCD" timeScale="1ms"/>
            <Line id="VD_1_VD" quantity="PopVD/1/VD/state" scale="1" color="#0000FF" timeScale="1ms"/>
            <Line id="VA_1_VA" quantity="PopVA/1/VA/state" scale="1" color="#8A2BE2" timeScale="1ms"/>
            <Line id="VB_1_VB" quantity="PopVB/1/VB/state" scale="1" color="#A52A2A" timeScale="1ms"/>
            <Line id="DA_2_DA" quantity="PopDA/2/DA/state" scale="1" color="#DEB887" timeScale="1ms"/>
            <Line id="DB_2_DB" quantity="PopDB/2/DB/state" scale="1" color="#5F9EA0" timeScale="1ms"/>
            <Line id="DD_2_DD" quantity="PopDD/2/DD/state" scale="1" color="#7FFF00" timeScale="1ms"/>
            <Line id="VD_2_VD" quantity="PopVD/2/VD/state" scale="1" color="#D2691E" timeScale="1ms"/>
            <Line id="VA_2_VA" quantity="PopVA/2/VA/state" scale="1" color="#FF7F50" timeScale="1ms"/>
            <Line id="VB_2_VB" quantity="PopVB/2/VB/state" scale="1" color="#6495ED" timeScale="1ms"/>
            <Line id="DA_3_DA" quantity="PopDA/3/DA/state" scale="1" color="#FFF8DC" timeScale="1ms"/>
            <Line id="DB_3_DB" quantity="PopDB/3/DB/state" scale="1" color="#DC143C" timeScale="1ms"/>
            <Line id="DD_3_DD" quantity="PopDD/3/DD/state" scale="1" color="#00FFFF" timeScale="1ms"/>
            <Line id="VD_3_VD" quantity="PopVD/3/VD/state" scale="1" color="#00008B" timeScale="1ms"/>
            <Line id="VA_3_VA" quantity="PopVA/3/VA/state" scale="1" color="#008B8B" timeScale="1ms"/>
            <Line id="VB_3_VB" quantity="PopVB/3/VB/state" scale="1" color="#B8860B" timeScale="1ms"/>
            <Line id="DA_4_DA" quantity="PopDA/4/DA/state" scale="1" color="#A9A9A9" timeScale="1ms"/>
            <Line id="DB_4_DB" quantity="PopDB/4/DB/state" scale="1" color="#006400" timeScale="1ms"/>
            <Line id="DD_4_DD" quantity="PopDD/4/DD/state" scale="1" color="#A9A9A9" timeScale="1ms"/>
            <Line id="VD_4_VD" quantity="PopVD/4/VD/state" scale="1" color="#BDB76B" timeScale="1ms"/>
            <Line id="VA_4_VA" quantity="PopVA/4/VA/state" scale="1" color="#8B008B" timeScale="1ms"/>
            <Line id="VB_4_VB" quantity="PopVB/4/VB/state" scale="1" color="#556B2F" timeScale="1ms"/>
            <Line id="DA_5_DA" quantity="PopDA/5/DA/state" scale="1" color="#FF8C00" timeScale="1ms"/>
            <Line id="DB_5_DB" quantity="PopDB/5/DB/state" scale="1" color="#9932CC" timeScale="1ms"/>
            <Line id="DD_5_DD" quantity="PopDD/5/DD/state" scale="1" color="#8B0000" timeScale="1ms"/>
            <Line id="VD_5_VD" quantity="PopVD/5/VD/state" scale="1" color="#E9967A" timeScale="1ms"/>
            <Line id="VA_5_VA" quantity="PopVA/5/VA/state" scale="1" color="#8FBC8F" timeScale="1ms"/>
            <Line id="VB_5_VB" quantity="PopVB/5/VB/state" scale="1" color="#483D8B" timeScale="1ms"/>
            <Line id="DA_6_DA" quantity="PopDA/6/DA/state" scale="1" color="#2F4F4F" timeScale="1ms"/>
            <Line id="DB_6_DB" quantity="PopDB/6/DB/state" scale="1" color="#2F4F4F" timeScale="1ms"/>
            <Line id="DD_6_DD" quantity="PopDD/6/DD/state" scale="1" color="#00CED1" timeScale="1ms"/>
            <Line id="VD_6_VD" quantity="PopVD/6/VD/state" scale="1" color="#9400D3" timeScale="1ms"/>
            <Line id="VA_6_VA" quantity="PopVA/6/VA/state" scale="1" color="#FF1493" timeScale="1ms"/>
            <Line id="VB_6_VB" quantity="PopVB/6/VB/state" scale="1" color="#00BFFF" timeScale="1ms"/>
            <Line id="DA_7_DA" quantity="PopDA/7/DA/state" scale="1" color="#696969" timeScale="1ms"/>
            <Line id="DB_7_DB" quantity="PopDB/7/DB/state" scale="1" color="#696969" timeScale="1ms"/>
            <Line id="DD_7_DD" quantity="PopDD/7/DD/state" scale="1" color="#1E90FF" timeScale="1ms"/>
            <Line id="VD_7_VD" quantity="PopVD/7/VD/state" scale="1" color="#B22222" timeScale="1ms"/>
            <Line id="VA_7_VA" quantity="PopVA/7/VA/state" scale="1" color="#FFFAF0" timeScale="1ms"/>
            <Line id="VB_7_VB" quantity="PopVB/7/VB/state" scale="1" color="#228B22" timeScale="1ms"/>
            <Line id="DA_8_DA" quantity="PopDA/8/DA/state" scale="1" color="#FF00FF" timeScale="1ms"/>
            <Line id="DB_8_DB" quantity="PopDB/8/DB/state" scale="1" color="#DCDCDC" timeScale="1ms"/>
            <Line id="DD_8_DD" quantity="PopDD/8/DD/state" scale="1" color="#F8F8FF" timeScale="1ms"/>
            <Line id="VD_8_VD" quantity="PopVD/8/VD/state" scale="1" color="#FFD700" timeScale="1ms"/>
            <Line id="VA_8_VA" quantity="PopVA/8/VA/state" scale="1" color="#DAA520" timeScale="1ms"/>
            <Line id="VB_8_VB" quantity="PopVB/8/VB/state" scale="1" color="#808080" timeScale="1ms"/>
            <Line id="DA_9_DA" quantity="PopDA/9/DA/state" scale="1" color="#008000" timeScale="1ms"/>
            <Line id="DB_9_DB" quantity="PopDB/9/DB/state" scale="1" color="#ADFF2F" timeScale="1ms"/>
            <Line id="DD_9_DD" quantity="PopDD/9/DD/state" scale="1" color="#808080" timeScale="1ms"/>
            <Line id="VD_9_VD" quantity="PopVD/9/VD/state" scale="1" color="#F0FFF0" timeScale="1ms"/>
            <Line id="VA_9_VA" quantity="PopVA/9/VA/state" scale="1" color="#FF69B4" timeScale="1ms"/>
            <Line id="VB_9_VB" quantity="PopVB/9/VB/state" scale="1" color="#CD5C5C" timeScale="1ms"/>
        </Display>

        <Display id="display1" title="Outputs" timeScale="1ms" xmin="-5000.0" xmax="55000.00000000001" ymin="-.1" ymax="1">
            <Line id="DA_0_DA" quantity="PopDA/0/DA/output" scale="1" color="#F0F8FF" timeScale="1ms"/>
            <Line id="DB_0_DB" quantity="PopDB/0/DB/output" scale="1" color="#FAEBD7" timeScale="1ms"/>
            <Line id="DD_0_DD" quantity="PopDD/0/DD/output" scale="1" color="#00FFFF" timeScale="1ms"/>
            <Line id="VD_0_VD" quantity="PopVD/0/VD/output" scale="1" color="#7FFFD4" timeScale="1ms"/>
            <Line id="VA_0_VA" quantity="PopVA/0/VA/output" scale="1" color="#F0FFFF" timeScale="1ms"/>
            <Line id="VB_0_VB" quantity="PopVB/0/VB/output" scale="1" color="#F5F5DC" timeScale="1ms"/>
            <Line id="DA_1_DA" quantity="PopDA/1/DA/output" scale="1" color="#FFE4C4" timeScale="1ms"/>
            <Line id="DB_1_DB" quantity="PopDB/1/DB/output" scale="1" color="#000000" timeScale="1ms"/>
            <Line id="DD_1_DD" quantity="PopDD/1/DD/output" scale="1" color="#FFEBCD" timeScale="1ms"/>
            <Line id="VD_1_VD" quantity="PopVD/1/VD/output" scale="1" color="#0000FF" timeScale="1ms"/>
            <Line id="VA_1_VA" quantity="PopVA/1/VA/output" scale="1" color="#8A2BE2" timeScale="1ms"/>
            <Line id="VB_1_VB" quantity="PopVB/1/VB/output" scale="1" color="#A52A2A" timeScale="1ms"/>
            <Line id="DA_2_DA" quantity="PopDA/2/DA/output" scale="1" color="#DEB887" timeScale="1ms"/>
            <Line id="DB_2_DB" quantity="PopDB/2/DB/output" scale="1" color="#5F9EA0" timeScale="1ms"/>
            <Line id="DD_2_DD" quantity="PopDD/2/DD/output" scale="1" color="#7FFF00" timeScale="1ms"/>
            <Line id="VD_2_VD" quantity="PopVD/2/VD/output" scale="1" color="#D2691E" timeScale="1ms"/>
            <Line id="VA_2_VA" quantity="PopVA/2/VA/output" scale="1" color="#FF7F50" timeScale="1ms"/>
            <Line id="VB_2_VB" quantity="PopVB/2/VB/output" scale="1" color="#6495ED" timeScale="1ms"/>
            <Line id="DA_3_DA" quantity="PopDA/3/DA/output" scale="1" color="#FFF8DC" timeScale="1ms"/>
            <Line id="DB_3_DB" quantity="PopDB/3/DB/output" scale="1" color="#DC143C" timeScale="1ms"/>
            <Line id="DD_3_DD" quantity="PopDD/3/DD/output" scale="1" color="#00FFFF" timeScale="1ms"/>
            <Line id="VD_3_VD" quantity="PopVD/3/VD/output" scale="1" color="#00008B" timeScale="1ms"/>
            <Line id="VA_3_VA" quantity="PopVA/3/VA/output" scale="1" color="#008B8B" timeScale="1ms"/>
            <Line id="VB_3_VB" quantity="PopVB/3/VB/output" scale="1" color="#B8860B" timeScale="1ms"/>
            <Line id="DA_4_DA" quantity="PopDA/4/DA/output" scale="1" color="#A9A9A9" timeScale="1ms"/>
            <Line id="DB_4_DB" quantity="PopDB/4/DB/output" scale="1" color="#006400" timeScale="1ms"/>
            <Line id="DD_4_DD" quantity="PopDD/4/DD/output" scale="1" color="#A9A9A9" timeScale="1ms"/>
            <Line id="VD_4_VD" quantity="PopVD/4/VD/output" scale="1" color="#BDB76B" timeScale="1ms"/>
            <Line id="VA_4_VA" quantity="PopVA/4/VA/output" scale="1" color="#8B008B" timeScale="1ms"/>
            <Line id="VB_4_VB" quantity="PopVB/4/VB/output" scale="1" color="#556B2F" timeScale="1ms"/>
            <Line id="DA_5_DA" quantity="PopDA/5/DA/output" scale="1" color="#FF8C00" timeScale="1ms"/>
            <Line id="DB_5_DB" quantity="PopDB/5/DB/output" scale="1" color="#9932CC" timeScale="1ms"/>
            <Line id="DD_5_DD" quantity="PopDD/5/DD/output" scale="1" color="#8B0000" timeScale="1ms"/>
            <Line id="VD_5_VD" quantity="PopVD/5/VD/output" scale="1" color="#E9967A" timeScale="1ms"/>
            <Line id="VA_5_VA" quantity="PopVA/5/VA/output" scale="1" color="#8FBC8F" timeScale="1ms"/>
            <Line id="VB_5_VB" quantity="PopVB/5/VB/output" scale="1" color="#483D8B" timeScale="1ms"/>
            <Line id="DA_6_DA" quantity="PopDA/6/DA/output" scale="1" color="#2F4F4F" timeScale="1ms"/>
            <Line id="DB_6_DB" quantity="PopDB/6/DB/output" scale="1" color="#2F4F4F" timeScale="1ms"/>
            <Line id="DD_6_DD" quantity="PopDD/6/DD/output" scale="1" color="#00CED1" timeScale="1ms"/>
            <Line id="VD_6_VD" quantity="PopVD/6/VD/output" scale="1" color="#9400D3" timeScale="1ms"/>
            <Line id="VA_6_VA" quantity="PopVA/6/VA/output" scale="1" color="#FF1493" timeScale="1ms"/>
            <Line id="VB_6_VB" quantity="PopVB/6/VB/output" scale="1" color="#00BFFF" timeScale="1ms"/>
            <Line id="DA_7_DA" quantity="PopDA/7/DA/output" scale="1" color="#696969" timeScale="1ms"/>
            <Line id="DB_7_DB" quantity="PopDB/7/DB/output" scale="1" color="#696969" timeScale="1ms"/>
            <Line id="DD_7_DD" quantity="PopDD/7/DD/output" scale="1" color="#1E90FF" timeScale="1ms"/>
            <Line id="VD_7_VD" quantity="PopVD/7/VD/output" scale="1" color="#B22222" timeScale="1ms"/>
            <Line id="VA_7_VA" quantity="PopVA/7/VA/output" scale="1" color="#FFFAF0" timeScale="1ms"/>
            <Line id="VB_7_VB" quantity="PopVB/7/VB/output" scale="1" color="#228B22" timeScale="1ms"/>
            <Line id="DA_8_DA" quantity="PopDA/8/DA/output" scale="1" color="#FF00FF" timeScale="1ms"/>
            <Line id="DB_8_DB" quantity="PopDB/8/DB/output" scale="1" color="#DCDCDC" timeScale="1ms"/>
            <Line id="DD_8_DD" quantity="PopDD/8/DD/output" scale="1" color="#F8F8FF" timeScale="1ms"/>
            <Line id="VD_8_VD" quantity="PopVD/8/VD/output" scale="1" color="#FFD700" timeScale="1ms"/>
            <Line id="VA_8_VA" quantity="PopVA/8/VA/output" scale="1" color="#DAA520" timeScale="1ms"/>
            <Line id="VB_8_VB" quantity="PopVB/8/VB/output" scale="1" color="#808080" timeScale="1ms"/>
            <Line id="DA_9_DA" quantity="PopDA/9/DA/output" scale="1" color="#008000" timeScale="1ms"/>
            <Line id="DB_9_DB" quantity="PopDB/9/DB/output" scale="1" color="#ADFF2F" timeScale="1ms"/>
            <Line id="DD_9_DD" quantity="PopDD/9/DD/output" scale="1" color="#808080" timeScale="1ms"/>
            <Line id="VD_9_VD" quantity="PopVD/9/VD/output" scale="1" color="#F0FFF0" timeScale="1ms"/>
            <Line id="VA_9_VA" quantity="PopVA/9/VA/output" scale="1" color="#FF69B4" timeScale="1ms"/>
            <Line id="VB_9_VB" quantity="PopVB/9/VB/output" scale="1" color="#CD5C5C" timeScale="1ms"/>
        </Display>

        <OutputFile id="states_file" fileName="Worm2D.states.dat">
            <OutputColumn id="DA_0_DA" quantity="PopDA/0/DA/state"/>
            <OutputColumn id="DB_0_DB" quantity="PopDB/0/DB/state"/>
            <OutputColumn id="DD_0_DD" quantity="PopDD/0/DD/state"/>
            <OutputColumn id="VD_0_VD" quantity="PopVD/0/VD/state"/>
            <OutputColumn id="VA_0_VA" quantity="PopVA/0/VA/state"/>
            <OutputColumn id="VB_0_VB" quantity="PopVB/0/VB/state"/>
            <OutputColumn id="DA_1_DA" quantity="PopDA/1/DA/state"/>
            <OutputColumn id="DB_1_DB" quantity="PopDB/1/DB/state"/>
            <OutputColumn id="DD_1_DD" quantity="PopDD/1/DD/state"/>
            <OutputColumn id="VD_1_VD" quantity="PopVD/1/VD/state"/>
            <OutputColumn id="VA_1_VA" quantity="PopVA/1/VA/state"/>
            <OutputColumn id="VB_1_VB" quantity="PopVB/1/VB/state"/>
            <OutputColumn id="DA_2_DA" quantity="PopDA/2/DA/state"/>
            <OutputColumn id="DB_2_DB" quantity="PopDB/2/DB/state"/>
            <OutputColumn id="DD_2_DD" quantity="PopDD/2/DD/state"/>
            <OutputColumn id="VD_2_VD" quantity="PopVD/2/VD/state"/>
            <OutputColumn id="VA_2_VA" quantity="PopVA/2/VA/state"/>
            <OutputColumn id="VB_2_VB" quantity="PopVB/2/VB/state"/>
            <OutputColumn id="DA_3_DA" quantity="PopDA/3/DA/state"/>
            <OutputColumn id="DB_3_DB" quantity="PopDB/3/DB/state"/>
            <OutputColumn id="DD_3_DD" quantity="PopDD/3/DD/state"/>
            <OutputColumn id="VD_3_VD" quantity="PopVD/3/VD/state"/>
            <OutputColumn id="VA_3_VA" quantity="PopVA/3/VA/state"/>
            <OutputColumn id="VB_3_VB" quantity="PopVB/3/VB/state"/>
            <OutputColumn id="DA_4_DA" quantity="PopDA/4/DA/state"/>
            <OutputColumn id="DB_4_DB" quantity="PopDB/4/DB/state"/>
            <OutputColumn id="DD_4_DD" quantity="PopDD/4/DD/state"/>
            <OutputColumn id="VD_4_VD" quantity="PopVD/4/VD/state"/>
            <OutputColumn id="VA_4_VA" quantity="PopVA/4/VA/state"/>
            <OutputColumn id="VB_4_VB" quantity="PopVB/4/VB/state"/>
            <OutputColumn id="DA_5_DA" quantity="PopDA/5/DA/state"/>
            <OutputColumn id="DB_5_DB" quantity="PopDB/5/DB/state"/>
            <OutputColumn id="DD_5_DD" quantity="PopDD/5/DD/state"/>
            <OutputColumn id="VD_5_VD" quantity="PopVD/5/VD/state"/>
            <OutputColumn id="VA_5_VA" quantity="PopVA/5/VA/state"/>
            <OutputColumn id="VB_5_VB" quantity="PopVB/5/VB/state"/>
            <OutputColumn id="DA_6_DA" quantity="PopDA/6/DA/state"/>
            <OutputColumn id="DB_6_DB" quantity="PopDB/6/DB/state"/>
            <OutputColumn id="DD_6_DD" quantity="PopDD/6/DD/state"/>
            <OutputColumn id="VD_6_VD" quantity="PopVD/6/VD/state"/>
            <OutputColumn id="VA_6_VA" quantity="PopVA/6/VA/state"/>
            <OutputColumn id="VB_6_VB" quantity="PopVB/6/VB/state"/>
            <OutputColumn id="DA_7_DA" quantity="PopDA/7/DA/state"/>
            <OutputColumn id="DB_7_DB" quantity="PopDB/7/DB/state"/>
            <OutputColumn id="DD_7_DD" quantity="PopDD/7/DD/state"/>
            <OutputColumn id="VD_7_VD" quantity="PopVD/7/VD/state"/>
            <OutputColumn id="VA_7_VA" quantity="PopVA/7/VA/state"/>
            <OutputColumn id="VB_7_VB" quantity="PopVB/7/VB/state"/>
            <OutputColumn id="DA_8_DA" quantity="PopDA/8/DA/state"/>
            <OutputColumn id="DB_8_DB" quantity="PopDB/8/DB/state"/>
            <OutputColumn id="DD_8_DD" quantity="PopDD/8/DD/state"/>
            <OutputColumn id="VD_8_VD" quantity="PopVD/8/VD/state"/>
            <OutputColumn id="VA_8_VA" quantity="PopVA/8/VA/state"/>
            <OutputColumn id="VB_8_VB" quantity="PopVB/8/VB/state"/>
            <OutputColumn id="DA_9_DA" quantity="PopDA/9/DA/state"/>
            <OutputColumn id="DB_9_DB" quantity="PopDB/9/DB/state"/>
            <OutputColumn id="DD_9_DD" quantity="PopDD/9/DD/state"/>
            <OutputColumn id="VD_9_VD" quantity="PopVD/9/VD/state"/>
            <OutputColumn id="VA_9_VA" quantity="PopVA/9/VA/state"/>
            <OutputColumn id="VB_9_VB" quantity="PopVB/9/VB/state"/>
        </OutputFile>

        <OutputFile id="outputs_file" fileName="Worm2D.outputs.dat">
            <OutputColumn id="DA_0_DA" quantity="PopDA/0/DA/output"/>
            <OutputColumn id="DB_0_DB" quantity="PopDB/0/DB/output"/>
            <OutputColumn id="DD_0_DD" quantity="PopDD/0/DD/output"/>
            <OutputColumn id="VD_0_VD" quantity="PopVD/0/VD/output"/>
            <OutputColumn id="VA_0_VA" quantity="PopVA/0/VA/output"/>
            <OutputColumn id="VB_0_VB" quantity="PopVB/0/VB/output"/>
            <OutputColumn id="DA_1_DA" quantity="PopDA/1/DA/output"/>
            <OutputColumn id="DB_1_DB" quantity="PopDB/1/DB/output"/>
            <OutputColumn id="DD_1_DD" quantity="PopDD/1/DD/output"/>
            <OutputColumn id="VD_1_VD" quantity="PopVD/1/VD/output"/>
            <OutputColumn id="VA_1_VA" quantity="PopVA/1/VA/output"/>
            <OutputColumn id="VB_1_VB" quantity="PopVB/1/VB/output"/>
            <OutputColumn id="DA_2_DA" quantity="PopDA/2/DA/output"/>
            <OutputColumn id="DB_2_DB" quantity="PopDB/2/DB/output"/>
            <OutputColumn id="DD_2_DD" quantity="PopDD/2/DD/output"/>
            <OutputColumn id="VD_2_VD" quantity="PopVD/2/VD/output"/>
            <OutputColumn id="VA_2_VA" quantity="PopVA/2/VA/output"/>
            <OutputColumn id="VB_2_VB" quantity="PopVB/2/VB/output"/>
            <OutputColumn id="DA_3_DA" quantity="PopDA/3/DA/output"/>
            <OutputColumn id="DB_3_DB" quantity="PopDB/3/DB/output"/>
            <OutputColumn id="DD_3_DD" quantity="PopDD/3/DD/output"/>
            <OutputColumn id="VD_3_VD" quantity="PopVD/3/VD/output"/>
            <OutputColumn id="VA_3_VA" quantity="PopVA/3/VA/output"/>
            <OutputColumn id="VB_3_VB" quantity="PopVB/3/VB/output"/>
            <OutputColumn id="DA_4_DA" quantity="PopDA/4/DA/output"/>
            <OutputColumn id="DB_4_DB" quantity="PopDB/4/DB/output"/>
            <OutputColumn id="DD_4_DD" quantity="PopDD/4/DD/output"/>
            <OutputColumn id="VD_4_VD" quantity="PopVD/4/VD/output"/>
            <OutputColumn id="VA_4_VA" quantity="PopVA/4/VA/output"/>
            <OutputColumn id="VB_4_VB" quantity="PopVB/4/VB/output"/>
            <OutputColumn id="DA_5_DA" quantity="PopDA/5/DA/output"/>
            <OutputColumn id="DB_5_DB" quantity="PopDB/5/DB/output"/>
            <OutputColumn id="DD_5_DD" quantity="PopDD/5/DD/output"/>
            <OutputColumn id="VD_5_VD" quantity="PopVD/5/VD/output"/>
            <OutputColumn id="VA_5_VA" quantity="PopVA/5/VA/output"/>
            <OutputColumn id="VB_5_VB" quantity="PopVB/5/VB/output"/>
            <OutputColumn id="DA_6_DA" quantity="PopDA/6/DA/output"/>
            <OutputColumn id="DB_6_DB" quantity="PopDB/6/DB/output"/>
            <OutputColumn id="DD_6_DD" quantity="PopDD/6/DD/output"/>
            <OutputColumn id="VD_6_VD" quantity="PopVD/6/VD/output"/>
            <OutputColumn id="VA_6_VA" quantity="PopVA/6/VA/output"/>
            <OutputColumn id="VB_6_VB" quantity="PopVB/6/VB/output"/>
            <OutputColumn id="DA_7_DA" quantity="PopDA/7/DA/output"/>
            <OutputColumn id="DB_7_DB" quantity="PopDB/7/DB/output"/>
            <OutputColumn id="DD_7_DD" quantity="PopDD/7/DD/output"/>
            <OutputColumn id="VD_7_VD" quantity="PopVD/7/VD/output"/>
            <OutputColumn id="VA_7_VA" quantity="PopVA/7/VA/output"/>
            <OutputColumn id="VB_7_VB" quantity="PopVB/7/VB/output"/>
            <OutputColumn id="DA_8_DA" quantity="PopDA/8/DA/output"/>
            <OutputColumn id="DB_8_DB" quantity="PopDB/8/DB/output"/>
            <OutputColumn id="DD_8_DD" quantity="PopDD/8/DD/output"/>
            <OutputColumn id="VD_8_VD" quantity="PopVD/8/VD/output"/>
            <OutputColumn id="VA_8_VA" quantity="PopVA/8/VA/output"/>
            <OutputColumn id="VB_8_VB" quantity="PopVB/8/VB/output"/>
            <OutputColumn id="DA_9_DA" quantity="PopDA/9/DA/output"/>
            <OutputColumn id="DB_9_DB" quantity="PopDB/9/DB/output"/>
            <OutputColumn id="DD_9_DD" quantity="PopDD/9/DD/output"/>
            <OutputColumn id="VD_9_VD" quantity="PopVD/9/VD/output"/>
            <OutputColumn id="VA_9_VA" quantity="PopVA/9/VA/output"/>
            <OutputColumn id="VB_9_VB" quantity="PopVB/9/VB/output"/>
        </OutputFile>

    </Simulation>

</Lems>
