<Lems>
<cellX id="AS" bias="1.8836440987626888" gain="1.0" state0="-1.8836440987626888" tau="0.28783611829729794s"/>
<cellX id="DA" bias="3.3669707555953523" gain="1.0" state0="-3.3669707555953523" tau="0.8799283058877291s"/>
<cellX id="DB" bias="-12.454270774190512" gain="1.0" state0="12.45427077419051" tau="0.10054794779337861s"/>
<cellX id="DD" bias="0.3467561202948966" gain="1.0" state0="-0.3467561202948966" tau="2.2048208871125543s"/>
<cellX id="VA" bias="-14.026108916673058" gain="1.0" state0="14.026108916673058" tau="0.9871218970095046s"/>
<cellX id="VB" bias="-10.15763134360784" gain="1.0" state0="10.157631343607838" tau="1.7747147184668193s"/>
<cellX id="VD" bias="-5.984910239148351" gain="1.0" state0="5.984910239148351" tau="0.10000000000000009s"/>
</Lems>
