<neuroml xmlns="http://www.neuroml.org/schema/neuroml2"  xmlns:xs="http://www.w3.org/2001/XMLSchema" xmlns:xsi="http://www.w3.org/2001/XMLSchema-instance" xsi:schemaLocation="http://www.neuroml.org/schema/neuroml2 https://raw.github.com/NeuroML/NeuroML2/development/Schemas/NeuroML2/NeuroML_v2.3.1.xsd" id="Worm2D">
    <pulseGenerator id="pulseGen_0" delay="20s" duration="10s" amplitude="10.000000 pA"/>
    <pulseGenerator id="extStim" delay="0s" duration="10000s" amplitude="1 pA"/>
    <network id="Worm2DNet">
        <population id="PopAS" component="AS" size="7" type="populationList">
            <property tag="type" value="I"/>
            <instance id="0">
                <location x="0.0" y="0.0" z="0.0"/>
            </instance>
            <instance id="1">
                <location x="0.0" y="0.0" z="100.0"/>
            </instance>
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        </population>
        <population id="PopDA" component="DA" size="7" type="populationList">
            <property tag="type" value="E"/>
            <instance id="0">
                <location x="100.0" y="-100.0" z="0.0"/>
            </instance>
            <instance id="1">
                <location x="100.0" y="-100.0" z="100.0"/>
            </instance>
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        </population>
        <population id="PopDB" component="DB" size="7" type="populationList">
            <property tag="type" value="E"/>
            <instance id="0">
                <location x="100.0" y="0.0" z="0.0"/>
            </instance>
            <instance id="1">
                <location x="100.0" y="0.0" z="100.0"/>
            </instance>
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        </population>
        <population id="PopDD" component="DD" size="7" type="populationList">
            <property tag="type" value="I"/>
            <instance id="0">
                <location x="100.0" y="100.0" z="0.0"/>
            </instance>
            <instance id="1">
                <location x="100.0" y="100.0" z="100.0"/>
            </instance>
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        </population>
        <population id="PopVA" component="VA" size="7" type="populationList">
            <property tag="type" value="E"/>
            <instance id="0">
                <location x="-100.0" y="-100.0" z="0.0"/>
            </instance>
            <instance id="1">
                <location x="-100.0" y="-100.0" z="100.0"/>
            </instance>
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        </population>
        <population id="PopVB" component="VB" size="7" type="populationList">
            <property tag="type" value="E"/>
            <instance id="0">
                <location x="-100.0" y="0.0" z="0.0"/>
            </instance>
            <instance id="1">
                <location x="-100.0" y="0.0" z="100.0"/>
            </instance>
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        </population>
        <population id="PopVD" component="VD" size="7" type="populationList">
            <property tag="type" value="I"/>
            <instance id="0">
                <location x="-100.0" y="100.0" z="0.0"/>
            </instance>
            <instance id="1">
                <location x="-100.0" y="100.0" z="100.0"/>
            </instance>
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        </population>
        <population id="PopMD1" component="MD1" size="7" type="populationList">
            <property tag="type" value="E"/>
            <instance id="0">
                <location x="100.0" y="100.0" z="0.0"/>
            </instance>
            <instance id="1">
                <location x="100.0" y="100.0" z="100.0"/>
            </instance>
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        </population>
        <population id="PopMD2" component="MD2" size="7" type="populationList">
            <property tag="type" value="E"/>
            <instance id="0">
                <location x="100.0" y="-100.0" z="0.0"/>
            </instance>
            <instance id="1">
                <location x="100.0" y="-100.0" z="100.0"/>
            </instance>
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        </population>
        <population id="PopMD3" component="MD3" size="7" type="populationList">
            <property tag="type" value="E"/>
            <instance id="0">
                <location x="-100.0" y="-100.0" z="0.0"/>
            </instance>
            <instance id="1">
                <location x="-100.0" y="-100.0" z="100.0"/>
            </instance>
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        </population>
        <population id="PopMD4" component="MD4" size="3" type="populationList">
            <property tag="type" value="E"/>
            <instance id="0">
                <location x="-100.0" y="100.0" z="0.0"/>
            </instance>
            <instance id="1">
                <location x="-100.0" y="100.0" z="100.0"/>
            </instance>
            <instance id="2">
                <location x="-100.0" y="100.0" z="200.0"/>
            </instance>
        </population>
        <population id="PopMV1" component="MV1" size="7" type="populationList">
            <property tag="type" value="E"/>
            <instance id="0">
                <location x="100.0" y="100.0" z="0.0"/>
            </instance>
            <instance id="1">
                <location x="100.0" y="100.0" z="100.0"/>
            </instance>
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        </population>
        <population id="PopMV2" component="MV2" size="7" type="populationList">
            <property tag="type" value="E"/>
            <instance id="0">
                <location x="100.0" y="-100.0" z="0.0"/>
            </instance>
            <instance id="1">
                <location x="100.0" y="-100.0" z="100.0"/>
            </instance>
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        </population>
        <population id="PopMV3" component="MV3" size="7" type="populationList">
            <property tag="type" value="E"/>
            <instance id="0">
                <location x="-100.0" y="-100.0" z="0.0"/>
            </instance>
            <instance id="1">
                <location x="-100.0" y="-100.0" z="100.0"/>
            </instance>
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        </population>
        <population id="PopMV4" component="MV4" size="3" type="populationList">
            <property tag="type" value="E"/>
            <instance id="0">
                <location x="-100.0" y="100.0" z="0.0"/>
            </instance>
            <instance id="1">
                <location x="-100.0" y="100.0" z="100.0"/>
            </instance>
            <instance id="2">
                <location x="-100.0" y="100.0" z="200.0"/>
            </instance>
        </population>
        <electricalProjection id="NC_PopVA_PopAS_gapJunction0" presynapticPopulation="PopVA" postsynapticPopulation="PopAS">
            <electricalConnectionInstanceW id="0" preCell="../PopVA/1/VA" postCell="../PopAS/0/AS" synapse="gapJunction0" weight="0.807852623764661"/>
            <electricalConnectionInstanceW id="1" preCell="../PopVA/2/VA" postCell="../PopAS/1/AS" synapse="gapJunction0" weight="0.807852623764661"/>
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        </electricalProjection>
        <electricalProjection id="NC_PopAS_PopDA_gapJunction0" presynapticPopulation="PopAS" postsynapticPopulation="PopDA">
            <electricalConnectionInstanceW id="0" preCell="../PopAS/1/AS" postCell="../PopDA/0/DA" synapse="gapJunction0" weight="0.020426064631231"/>
            <electricalConnectionInstanceW id="1" preCell="../PopAS/2/AS" postCell="../PopDA/1/DA" synapse="gapJunction0" weight="0.020426064631231"/>
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        </electricalProjection>
        <electricalProjection id="NC_PopVD_PopDD_gapJunction0" presynapticPopulation="PopVD" postsynapticPopulation="PopDD">
            <electricalConnectionInstanceW id="0" preCell="../PopVD/0/VD" postCell="../PopDD/0/DD" synapse="gapJunction0" weight="0.444301377323279"/>
            <electricalConnectionInstanceW id="1" preCell="../PopVD/1/VD" postCell="../PopDD/1/DD" synapse="gapJunction0" weight="0.444301377323279"/>
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        </electricalProjection>
        <electricalProjection id="NC_PopDD_PopVD_gapJunction0" presynapticPopulation="PopDD" postsynapticPopulation="PopVD">
            <electricalConnectionInstanceW id="0" preCell="../PopDD/0/DD" postCell="../PopVD/0/VD" synapse="gapJunction0" weight="0.444301377323279"/>
            <electricalConnectionInstanceW id="1" preCell="../PopDD/1/DD" postCell="../PopVD/1/VD" synapse="gapJunction0" weight="0.444301377323279"/>
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        </electricalProjection>
        <electricalProjection id="NC_PopDB_PopVB_gapJunction0" presynapticPopulation="PopDB" postsynapticPopulation="PopVB">
            <electricalConnectionInstanceW id="0" preCell="../PopDB/1/DB" postCell="../PopVB/0/VB" synapse="gapJunction0" weight="0.838529881301883"/>
            <electricalConnectionInstanceW id="1" preCell="../PopDB/2/DB" postCell="../PopVB/1/VB" synapse="gapJunction0" weight="0.838529881301883"/>
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        </electricalProjection>
        <electricalProjection id="NC_PopDA_PopAS_gapJunction0" presynapticPopulation="PopDA" postsynapticPopulation="PopAS">
            <electricalConnectionInstanceW id="0" preCell="../PopDA/0/DA" postCell="../PopAS/1/AS" synapse="gapJunction0" weight="0.020426064631231"/>
            <electricalConnectionInstanceW id="1" preCell="../PopDA/1/DA" postCell="../PopAS/2/AS" synapse="gapJunction0" weight="0.020426064631231"/>
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        </electricalProjection>
        <electricalProjection id="NC_PopVB_PopDB_gapJunction0" presynapticPopulation="PopVB" postsynapticPopulation="PopDB">
            <electricalConnectionInstanceW id="0" preCell="../PopVB/0/VB" postCell="../PopDB/1/DB" synapse="gapJunction0" weight="0.838529881301883"/>
            <electricalConnectionInstanceW id="1" preCell="../PopVB/1/VB" postCell="../PopDB/2/DB" synapse="gapJunction0" weight="0.838529881301883"/>
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        </electricalProjection>
        <electricalProjection id="NC_PopAS_PopVA_gapJunction0" presynapticPopulation="PopAS" postsynapticPopulation="PopVA">
            <electricalConnectionInstanceW id="0" preCell="../PopAS/0/AS" postCell="../PopVA/1/VA" synapse="gapJunction0" weight="0.807852623764661"/>
            <electricalConnectionInstanceW id="1" preCell="../PopAS/1/AS" postCell="../PopVA/2/VA" synapse="gapJunction0" weight="0.807852623764661"/>
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        </electricalProjection>
        <continuousProjection id="NC_PopAS_PopMD1_silentSyn" presynapticPopulation="PopAS" postsynapticPopulation="PopMD1">
            <continuousConnectionInstanceW id="0" preCell="../PopAS/0/AS" postCell="../PopMD1/0/MD1" preComponent="silentSyn" postComponent="neuron_to_neuron_syn_x" weight="0.000767686528251"/>
            <continuousConnectionInstanceW id="1" preCell="../PopAS/1/AS" postCell="../PopMD1/1/MD1" preComponent="silentSyn" postComponent="neuron_to_neuron_syn_x" weight="0.000689544109359"/>
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        </continuousProjection>
        <continuousProjection id="NC_PopDA_PopMD1_silentSyn" presynapticPopulation="PopDA" postsynapticPopulation="PopMD1">
            <continuousConnectionInstanceW id="0" preCell="../PopDA/0/DA" postCell="../PopMD1/0/MD1" preComponent="silentSyn" postComponent="neuron_to_neuron_syn_x" weight="0.136963610910313"/>
            <continuousConnectionInstanceW id="1" preCell="../PopDA/1/DA" postCell="../PopMD1/1/MD1" preComponent="silentSyn" postComponent="neuron_to_neuron_syn_x" weight="0.123022155038954"/>
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        </continuousProjection>
        <continuousProjection id="NC_PopDB_PopMD1_silentSyn" presynapticPopulation="PopDB" postsynapticPopulation="PopMD1">
            <continuousConnectionInstanceW id="0" preCell="../PopDB/0/DB" postCell="../PopMD1/0/MD1" preComponent="silentSyn" postComponent="neuron_to_neuron_syn_x" weight="0.84"/>
            <continuousConnectionInstanceW id="1" preCell="../PopDB/1/DB" postCell="../PopMD1/1/MD1" preComponent="silentSyn" postComponent="neuron_to_neuron_syn_x" weight="0.754496829821388"/>
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        </continuousProjection>
        <continuousProjection id="NC_PopDD_PopMD1_silentSyn" presynapticPopulation="PopDD" postsynapticPopulation="PopMD1">
            <continuousConnectionInstanceW id="0" preCell="../PopDD/0/DD" postCell="../PopMD1/0/MD1" preComponent="silentSyn" postComponent="neuron_to_neuron_syn_x" weight="-0.631746313180336"/>
            <continuousConnectionInstanceW id="1" preCell="../PopDD/1/DD" postCell="../PopMD1/1/MD1" preComponent="silentSyn" postComponent="neuron_to_neuron_syn_x" weight="-0.567441179221326"/>
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        </continuousProjection>
        <continuousProjection id="NC_PopAS_PopMD2_silentSyn" presynapticPopulation="PopAS" postsynapticPopulation="PopMD2">
            <continuousConnectionInstanceW id="0" preCell="../PopAS/0/AS" postCell="../PopMD2/0/MD2" preComponent="silentSyn" postComponent="neuron_to_neuron_syn_x" weight="0.000748150923528"/>
            <continuousConnectionInstanceW id="1" preCell="../PopAS/1/AS" postCell="../PopMD2/1/MD2" preComponent="silentSyn" postComponent="neuron_to_neuron_syn_x" weight="0.000670008504637"/>
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        </continuousProjection>
        <continuousProjection id="NC_PopDA_PopMD2_silentSyn" presynapticPopulation="PopDA" postsynapticPopulation="PopMD2">
            <continuousConnectionInstanceW id="0" preCell="../PopDA/0/DA" postCell="../PopMD2/0/MD2" preComponent="silentSyn" postComponent="neuron_to_neuron_syn_x" weight="0.133478246942473"/>
            <continuousConnectionInstanceW id="1" preCell="../PopDA/1/DA" postCell="../PopMD2/1/MD2" preComponent="silentSyn" postComponent="neuron_to_neuron_syn_x" weight="0.119536791071114"/>
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        </continuousProjection>
        <continuousProjection id="NC_PopDB_PopMD2_silentSyn" presynapticPopulation="PopDB" postsynapticPopulation="PopMD2">
            <continuousConnectionInstanceW id="0" preCell="../PopDB/0/DB" postCell="../PopMD2/0/MD2" preComponent="silentSyn" postComponent="neuron_to_neuron_syn_x" weight="0.818624207455347"/>
            <continuousConnectionInstanceW id="1" preCell="../PopDB/1/DB" postCell="../PopMD2/1/MD2" preComponent="silentSyn" postComponent="neuron_to_neuron_syn_x" weight="0.733121037276735"/>
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        </continuousProjection>
        <continuousProjection id="NC_PopDD_PopMD2_silentSyn" presynapticPopulation="PopDD" postsynapticPopulation="PopMD2">
            <continuousConnectionInstanceW id="0" preCell="../PopDD/0/DD" postCell="../PopMD2/0/MD2" preComponent="silentSyn" postComponent="neuron_to_neuron_syn_x" weight="-0.615670029690584"/>
            <continuousConnectionInstanceW id="1" preCell="../PopDD/1/DD" postCell="../PopMD2/1/MD2" preComponent="silentSyn" postComponent="neuron_to_neuron_syn_x" weight="-0.551364895731573"/>
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        </continuousProjection>
        <continuousProjection id="NC_PopAS_PopMD3_silentSyn" presynapticPopulation="PopAS" postsynapticPopulation="PopMD3">
            <continuousConnectionInstanceW id="0" preCell="../PopAS/0/AS" postCell="../PopMD3/0/MD3" preComponent="silentSyn" postComponent="neuron_to_neuron_syn_x" weight="0.000728615318805"/>
            <continuousConnectionInstanceW id="1" preCell="../PopAS/1/AS" postCell="../PopMD3/1/MD3" preComponent="silentSyn" postComponent="neuron_to_neuron_syn_x" weight="0.000650472899914"/>
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        </continuousProjection>
        <continuousProjection id="NC_PopDA_PopMD3_silentSyn" presynapticPopulation="PopDA" postsynapticPopulation="PopMD3">
            <continuousConnectionInstanceW id="0" preCell="../PopDA/0/DA" postCell="../PopMD3/0/MD3" preComponent="silentSyn" postComponent="neuron_to_neuron_syn_x" weight="0.129992882974634"/>
            <continuousConnectionInstanceW id="1" preCell="../PopDA/1/DA" postCell="../PopMD3/1/MD3" preComponent="silentSyn" postComponent="neuron_to_neuron_syn_x" weight="0.116051427103274"/>
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        </continuousProjection>
        <continuousProjection id="NC_PopDB_PopMD3_silentSyn" presynapticPopulation="PopDB" postsynapticPopulation="PopMD3">
            <continuousConnectionInstanceW id="0" preCell="../PopDB/0/DB" postCell="../PopMD3/0/MD3" preComponent="silentSyn" postComponent="neuron_to_neuron_syn_x" weight="0.797248414910694"/>
            <continuousConnectionInstanceW id="1" preCell="../PopDB/1/DB" postCell="../PopMD3/1/MD3" preComponent="silentSyn" postComponent="neuron_to_neuron_syn_x" weight="0.711745244732082"/>
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        </continuousProjection>
        <continuousProjection id="NC_PopDD_PopMD3_silentSyn" presynapticPopulation="PopDD" postsynapticPopulation="PopMD3">
            <continuousConnectionInstanceW id="0" preCell="../PopDD/0/DD" postCell="../PopMD3/0/MD3" preComponent="silentSyn" postComponent="neuron_to_neuron_syn_x" weight="-0.599593746200831"/>
            <continuousConnectionInstanceW id="1" preCell="../PopDD/1/DD" postCell="../PopMD3/1/MD3" preComponent="silentSyn" postComponent="neuron_to_neuron_syn_x" weight="-0.53528861224182"/>
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        </continuousProjection>
        <continuousProjection id="NC_PopAS_PopMD4_silentSyn" presynapticPopulation="PopAS" postsynapticPopulation="PopMD4">
            <continuousConnectionInstanceW id="0" preCell="../PopAS/0/AS" postCell="../PopMD4/0/MD4" preComponent="silentSyn" postComponent="neuron_to_neuron_syn_x" weight="0.000709079714082"/>
            <continuousConnectionInstanceW id="1" preCell="../PopAS/5/AS" postCell="../PopMD4/1/MD4" preComponent="silentSyn" postComponent="neuron_to_neuron_syn_x" weight="0.000396510038516"/>
            <continuousConnectionInstanceW id="2" preCell="../PopAS/6/AS" postCell="../PopMD4/2/MD4" preComponent="silentSyn" postComponent="neuron_to_neuron_syn_x" weight="0.000318367619625"/>
        </continuousProjection>
        <continuousProjection id="NC_PopDA_PopMD4_silentSyn" presynapticPopulation="PopDA" postsynapticPopulation="PopMD4">
            <continuousConnectionInstanceW id="0" preCell="../PopDA/0/DA" postCell="../PopMD4/0/MD4" preComponent="silentSyn" postComponent="neuron_to_neuron_syn_x" weight="0.126507519006794"/>
            <continuousConnectionInstanceW id="1" preCell="../PopDA/5/DA" postCell="../PopMD4/1/MD4" preComponent="silentSyn" postComponent="neuron_to_neuron_syn_x" weight="0.070741695521357"/>
            <continuousConnectionInstanceW id="2" preCell="../PopDA/6/DA" postCell="../PopMD4/2/MD4" preComponent="silentSyn" postComponent="neuron_to_neuron_syn_x" weight="0.056800239649998"/>
        </continuousProjection>
        <continuousProjection id="NC_PopDB_PopMD4_silentSyn" presynapticPopulation="PopDB" postsynapticPopulation="PopMD4">
            <continuousConnectionInstanceW id="0" preCell="../PopDB/0/DB" postCell="../PopMD4/0/MD4" preComponent="silentSyn" postComponent="neuron_to_neuron_syn_x" weight="0.775872622366041"/>
            <continuousConnectionInstanceW id="1" preCell="../PopDB/5/DB" postCell="../PopMD4/1/MD4" preComponent="silentSyn" postComponent="neuron_to_neuron_syn_x" weight="0.433859941651593"/>
            <continuousConnectionInstanceW id="2" preCell="../PopDB/6/DB" postCell="../PopMD4/2/MD4" preComponent="silentSyn" postComponent="neuron_to_neuron_syn_x" weight="0.348356771472981"/>
        </continuousProjection>
        <continuousProjection id="NC_PopDD_PopMD4_silentSyn" presynapticPopulation="PopDD" postsynapticPopulation="PopMD4">
            <continuousConnectionInstanceW id="0" preCell="../PopDD/0/DD" postCell="../PopMD4/0/MD4" preComponent="silentSyn" postComponent="neuron_to_neuron_syn_x" weight="-0.583517462711078"/>
            <continuousConnectionInstanceW id="1" preCell="../PopDD/5/DD" postCell="../PopMD4/1/MD4" preComponent="silentSyn" postComponent="neuron_to_neuron_syn_x" weight="-0.326296926875035"/>
            <continuousConnectionInstanceW id="2" preCell="../PopDD/6/DD" postCell="../PopMD4/2/MD4" preComponent="silentSyn" postComponent="neuron_to_neuron_syn_x" weight="-0.261991792916024"/>
        </continuousProjection>
        <continuousProjection id="NC_PopVD_PopMV1_silentSyn" presynapticPopulation="PopVD" postsynapticPopulation="PopMV1">
            <continuousConnectionInstanceW id="0" preCell="../PopVD/0/VD" postCell="../PopMV1/0/MV1" preComponent="silentSyn" postComponent="neuron_to_neuron_syn_x" weight="-0.600370319685173"/>
            <continuousConnectionInstanceW id="1" preCell="../PopVD/1/VD" postCell="../PopMV1/1/MV1" preComponent="silentSyn" postComponent="neuron_to_neuron_syn_x" weight="-0.539258932049186"/>
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        </continuousProjection>
        <continuousProjection id="NC_PopVA_PopMV1_silentSyn" presynapticPopulation="PopVA" postsynapticPopulation="PopMV1">
            <continuousConnectionInstanceW id="0" preCell="../PopVA/0/VA" postCell="../PopMV1/0/MV1" preComponent="silentSyn" postComponent="neuron_to_neuron_syn_x" weight="0.563168604507659"/>
            <continuousConnectionInstanceW id="1" preCell="../PopVA/1/VA" postCell="../PopMV1/1/MV1" preComponent="silentSyn" postComponent="neuron_to_neuron_syn_x" weight="0.505843960423767"/>
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        </continuousProjection>
        <continuousProjection id="NC_PopVB_PopMV1_silentSyn" presynapticPopulation="PopVB" postsynapticPopulation="PopMV1">
            <continuousConnectionInstanceW id="0" preCell="../PopVB/0/VB" postCell="../PopMV1/0/MV1" preComponent="silentSyn" postComponent="neuron_to_neuron_syn_x" weight="0.84"/>
            <continuousConnectionInstanceW id="1" preCell="../PopVB/1/VB" postCell="../PopMV1/1/MV1" preComponent="silentSyn" postComponent="neuron_to_neuron_syn_x" weight="0.754496829821388"/>
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        </continuousProjection>
        <continuousProjection id="NC_PopVD_PopMV2_silentSyn" presynapticPopulation="PopVD" postsynapticPopulation="PopMV2">
            <continuousConnectionInstanceW id="0" preCell="../PopVD/0/VD" postCell="../PopMV2/0/MV2" preComponent="silentSyn" postComponent="neuron_to_neuron_syn_x" weight="-0.585092472776176"/>
            <continuousConnectionInstanceW id="1" preCell="../PopVD/1/VD" postCell="../PopMV2/1/MV2" preComponent="silentSyn" postComponent="neuron_to_neuron_syn_x" weight="-0.523981085140189"/>
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        </continuousProjection>
        <continuousProjection id="NC_PopVA_PopMV2_silentSyn" presynapticPopulation="PopVA" postsynapticPopulation="PopMV2">
            <continuousConnectionInstanceW id="0" preCell="../PopVA/0/VA" postCell="../PopMV2/0/MV2" preComponent="silentSyn" postComponent="neuron_to_neuron_syn_x" weight="0.548837443486686"/>
            <continuousConnectionInstanceW id="1" preCell="../PopVA/1/VA" postCell="../PopMV2/1/MV2" preComponent="silentSyn" postComponent="neuron_to_neuron_syn_x" weight="0.491512799402794"/>
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        </continuousProjection>
        <continuousProjection id="NC_PopVB_PopMV2_silentSyn" presynapticPopulation="PopVB" postsynapticPopulation="PopMV2">
            <continuousConnectionInstanceW id="0" preCell="../PopVB/0/VB" postCell="../PopMV2/0/MV2" preComponent="silentSyn" postComponent="neuron_to_neuron_syn_x" weight="0.818624207455347"/>
            <continuousConnectionInstanceW id="1" preCell="../PopVB/1/VB" postCell="../PopMV2/1/MV2" preComponent="silentSyn" postComponent="neuron_to_neuron_syn_x" weight="0.733121037276735"/>
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        </continuousProjection>
        <continuousProjection id="NC_PopVD_PopMV3_silentSyn" presynapticPopulation="PopVD" postsynapticPopulation="PopMV3">
            <continuousConnectionInstanceW id="0" preCell="../PopVD/0/VD" postCell="../PopMV3/0/MV3" preComponent="silentSyn" postComponent="neuron_to_neuron_syn_x" weight="-0.569814625867179"/>
            <continuousConnectionInstanceW id="1" preCell="../PopVD/1/VD" postCell="../PopMV3/1/MV3" preComponent="silentSyn" postComponent="neuron_to_neuron_syn_x" weight="-0.508703238231192"/>
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        </continuousProjection>
        <continuousProjection id="NC_PopVA_PopMV3_silentSyn" presynapticPopulation="PopVA" postsynapticPopulation="PopMV3">
            <continuousConnectionInstanceW id="0" preCell="../PopVA/0/VA" postCell="../PopMV3/0/MV3" preComponent="silentSyn" postComponent="neuron_to_neuron_syn_x" weight="0.534506282465713"/>
            <continuousConnectionInstanceW id="1" preCell="../PopVA/1/VA" postCell="../PopMV3/1/MV3" preComponent="silentSyn" postComponent="neuron_to_neuron_syn_x" weight="0.47718163838182"/>
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        </continuousProjection>
        <continuousProjection id="NC_PopVB_PopMV3_silentSyn" presynapticPopulation="PopVB" postsynapticPopulation="PopMV3">
            <continuousConnectionInstanceW id="0" preCell="../PopVB/0/VB" postCell="../PopMV3/0/MV3" preComponent="silentSyn" postComponent="neuron_to_neuron_syn_x" weight="0.797248414910694"/>
            <continuousConnectionInstanceW id="1" preCell="../PopVB/1/VB" postCell="../PopMV3/1/MV3" preComponent="silentSyn" postComponent="neuron_to_neuron_syn_x" weight="0.711745244732082"/>
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        </continuousProjection>
        <continuousProjection id="NC_PopVD_PopMV4_silentSyn" presynapticPopulation="PopVD" postsynapticPopulation="PopMV4">
            <continuousConnectionInstanceW id="0" preCell="../PopVD/0/VD" postCell="../PopMV4/0/MV4" preComponent="silentSyn" postComponent="neuron_to_neuron_syn_x" weight="-0.554536778958183"/>
            <continuousConnectionInstanceW id="1" preCell="../PopVD/5/VD" postCell="../PopMV4/1/MV4" preComponent="silentSyn" postComponent="neuron_to_neuron_syn_x" weight="-0.310091228414235"/>
            <continuousConnectionInstanceW id="2" preCell="../PopVD/6/VD" postCell="../PopMV4/2/MV4" preComponent="silentSyn" postComponent="neuron_to_neuron_syn_x" weight="-0.248979840778248"/>
        </continuousProjection>
        <continuousProjection id="NC_PopVA_PopMV4_silentSyn" presynapticPopulation="PopVA" postsynapticPopulation="PopMV4">
            <continuousConnectionInstanceW id="0" preCell="../PopVA/0/VA" postCell="../PopMV4/0/MV4" preComponent="silentSyn" postComponent="neuron_to_neuron_syn_x" weight="0.52017512144474"/>
            <continuousConnectionInstanceW id="1" preCell="../PopVA/5/VA" postCell="../PopMV4/1/MV4" preComponent="silentSyn" postComponent="neuron_to_neuron_syn_x" weight="0.290876545109169"/>
            <continuousConnectionInstanceW id="2" preCell="../PopVA/6/VA" postCell="../PopMV4/2/MV4" preComponent="silentSyn" postComponent="neuron_to_neuron_syn_x" weight="0.233551901025276"/>
        </continuousProjection>
        <continuousProjection id="NC_PopVB_PopMV4_silentSyn" presynapticPopulation="PopVB" postsynapticPopulation="PopMV4">
            <continuousConnectionInstanceW id="0" preCell="../PopVB/0/VB" postCell="../PopMV4/0/MV4" preComponent="silentSyn" postComponent="neuron_to_neuron_syn_x" weight="0.775872622366041"/>
            <continuousConnectionInstanceW id="1" preCell="../PopVB/5/VB" postCell="../PopMV4/1/MV4" preComponent="silentSyn" postComponent="neuron_to_neuron_syn_x" weight="0.433859941651593"/>
            <continuousConnectionInstanceW id="2" preCell="../PopVB/6/VB" postCell="../PopMV4/2/MV4" preComponent="silentSyn" postComponent="neuron_to_neuron_syn_x" weight="0.348356771472981"/>
        </continuousProjection>
        <continuousProjection id="NC_PopAS_PopAS_silentSyn" presynapticPopulation="PopAS" postsynapticPopulation="PopAS">
            <continuousConnectionInstanceW id="0" preCell="../PopAS/0/AS" postCell="../PopAS/0/AS" preComponent="silentSyn" postComponent="neuron_to_neuron_syn_x" weight="9.680923151515557"/>
            <continuousConnectionInstanceW id="1" preCell="../PopAS/1/AS" postCell="../PopAS/1/AS" preComponent="silentSyn" postComponent="neuron_to_neuron_syn_x" weight="9.680923151515557"/>
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        </continuousProjection>
        <continuousProjection id="NC_PopDB_PopAS_silentSyn" presynapticPopulation="PopDB" postsynapticPopulation="PopAS">
            <continuousConnectionInstanceW id="0" preCell="../PopDB/0/DB" postCell="../PopAS/0/AS" preComponent="silentSyn" postComponent="neuron_to_neuron_syn_x" weight="-13.284663324849728"/>
            <continuousConnectionInstanceW id="1" preCell="../PopDB/1/DB" postCell="../PopAS/1/AS" preComponent="silentSyn" postComponent="neuron_to_neuron_syn_x" weight="-13.284663324849728"/>
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        </continuousProjection>
        <continuousProjection id="NC_PopDA_PopDA_silentSyn" presynapticPopulation="PopDA" postsynapticPopulation="PopDA">
            <continuousConnectionInstanceW id="0" preCell="../PopDA/0/DA" postCell="../PopDA/0/DA" preComponent="silentSyn" postComponent="neuron_to_neuron_syn_x" weight="-0.138635010660755"/>
            <continuousConnectionInstanceW id="1" preCell="../PopDA/1/DA" postCell="../PopDA/1/DA" preComponent="silentSyn" postComponent="neuron_to_neuron_syn_x" weight="-0.138635010660755"/>
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        </continuousProjection>
        <continuousProjection id="NC_PopAS_PopDA_silentSyn" presynapticPopulation="PopAS" postsynapticPopulation="PopDA">
            <continuousConnectionInstanceW id="0" preCell="../PopAS/0/AS" postCell="../PopDA/0/DA" preComponent="silentSyn" postComponent="neuron_to_neuron_syn_x" weight="-13.370647326132525"/>
            <continuousConnectionInstanceW id="1" preCell="../PopAS/1/AS" postCell="../PopDA/1/DA" preComponent="silentSyn" postComponent="neuron_to_neuron_syn_x" weight="-13.370647326132525"/>
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        </continuousProjection>
        <continuousProjection id="NC_PopDB_PopDB_silentSyn" presynapticPopulation="PopDB" postsynapticPopulation="PopDB">
            <continuousConnectionInstanceW id="0" preCell="../PopDB/0/DB" postCell="../PopDB/0/DB" preComponent="silentSyn" postComponent="neuron_to_neuron_syn_x" weight="3.754764517249285"/>
            <continuousConnectionInstanceW id="1" preCell="../PopDB/1/DB" postCell="../PopDB/1/DB" preComponent="silentSyn" postComponent="neuron_to_neuron_syn_x" weight="3.754764517249285"/>
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        </continuousProjection>
        <continuousProjection id="NC_PopDA_PopDB_silentSyn" presynapticPopulation="PopDA" postsynapticPopulation="PopDB">
            <continuousConnectionInstanceW id="0" preCell="../PopDA/0/DA" postCell="../PopDB/0/DB" preComponent="silentSyn" postComponent="neuron_to_neuron_syn_x" weight="-14.880055712798304"/>
            <continuousConnectionInstanceW id="1" preCell="../PopDA/1/DA" postCell="../PopDB/1/DB" preComponent="silentSyn" postComponent="neuron_to_neuron_syn_x" weight="-14.880055712798304"/>
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        </continuousProjection>
        <continuousProjection id="NC_PopDD_PopDD_silentSyn" presynapticPopulation="PopDD" postsynapticPopulation="PopDD">
            <continuousConnectionInstanceW id="0" preCell="../PopDD/0/DD" postCell="../PopDD/0/DD" preComponent="silentSyn" postComponent="neuron_to_neuron_syn_x" weight="-1.816167389785238"/>
            <continuousConnectionInstanceW id="1" preCell="../PopDD/1/DD" postCell="../PopDD/1/DD" preComponent="silentSyn" postComponent="neuron_to_neuron_syn_x" weight="-1.816167389785238"/>
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        </continuousProjection>
        <continuousProjection id="NC_PopDA_PopDD_silentSyn" presynapticPopulation="PopDA" postsynapticPopulation="PopDD">
            <continuousConnectionInstanceW id="0" preCell="../PopDA/0/DA" postCell="../PopDD/0/DD" preComponent="silentSyn" postComponent="neuron_to_neuron_syn_x" weight="-1.949963116586537"/>
            <continuousConnectionInstanceW id="1" preCell="../PopDA/1/DA" postCell="../PopDD/1/DD" preComponent="silentSyn" postComponent="neuron_to_neuron_syn_x" weight="-1.949963116586537"/>
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        </continuousProjection>
        <continuousProjection id="NC_PopVB_PopDD_silentSyn" presynapticPopulation="PopVB" postsynapticPopulation="PopDD">
            <continuousConnectionInstanceW id="0" preCell="../PopVB/0/VB" postCell="../PopDD/0/DD" preComponent="silentSyn" postComponent="neuron_to_neuron_syn_x" weight="9.830215868882773"/>
            <continuousConnectionInstanceW id="1" preCell="../PopVB/1/VB" postCell="../PopDD/1/DD" preComponent="silentSyn" postComponent="neuron_to_neuron_syn_x" weight="9.830215868882773"/>
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        </continuousProjection>
        <continuousProjection id="NC_PopVA_PopDD_silentSyn" presynapticPopulation="PopVA" postsynapticPopulation="PopDD">
            <continuousConnectionInstanceW id="0" preCell="../PopVA/0/VA" postCell="../PopDD/0/DD" preComponent="silentSyn" postComponent="neuron_to_neuron_syn_x" weight="4.772101433987111"/>
            <continuousConnectionInstanceW id="1" preCell="../PopVA/1/VA" postCell="../PopDD/0/DD" preComponent="silentSyn" postComponent="neuron_to_neuron_syn_x" weight="12.029294258977179"/>
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        </continuousProjection>
        <continuousProjection id="NC_PopVD_PopVD_silentSyn" presynapticPopulation="PopVD" postsynapticPopulation="PopVD">
            <continuousConnectionInstanceW id="0" preCell="../PopVD/0/VD" postCell="../PopVD/0/VD" preComponent="silentSyn" postComponent="neuron_to_neuron_syn_x" weight="-7.513857757374462"/>
            <continuousConnectionInstanceW id="1" preCell="../PopVD/1/VD" postCell="../PopVD/1/VD" preComponent="silentSyn" postComponent="neuron_to_neuron_syn_x" weight="-7.513857757374462"/>
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        </continuousProjection>
        <continuousProjection id="NC_PopAS_PopVD_silentSyn" presynapticPopulation="PopAS" postsynapticPopulation="PopVD">
            <continuousConnectionInstanceW id="0" preCell="../PopAS/0/AS" postCell="../PopVD/0/VD" preComponent="silentSyn" postComponent="neuron_to_neuron_syn_x" weight="14.960926430100246"/>
            <continuousConnectionInstanceW id="1" preCell="../PopAS/1/AS" postCell="../PopVD/1/VD" preComponent="silentSyn" postComponent="neuron_to_neuron_syn_x" weight="14.960926430100246"/>
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        </continuousProjection>
        <continuousProjection id="NC_PopVB_PopVB_silentSyn" presynapticPopulation="PopVB" postsynapticPopulation="PopVB">
            <continuousConnectionInstanceW id="0" preCell="../PopVB/0/VB" postCell="../PopVB/0/VB" preComponent="silentSyn" postComponent="neuron_to_neuron_syn_x" weight="-9.475008482278923"/>
            <continuousConnectionInstanceW id="1" preCell="../PopVB/1/VB" postCell="../PopVB/1/VB" preComponent="silentSyn" postComponent="neuron_to_neuron_syn_x" weight="-9.475008482278923"/>
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        </continuousProjection>
        <continuousProjection id="NC_PopVD_PopVB_silentSyn" presynapticPopulation="PopVD" postsynapticPopulation="PopVB">
            <continuousConnectionInstanceW id="0" preCell="../PopVD/0/VD" postCell="../PopVB/0/VB" preComponent="silentSyn" postComponent="neuron_to_neuron_syn_x" weight="-8.133001982099486"/>
            <continuousConnectionInstanceW id="1" preCell="../PopVD/1/VD" postCell="../PopVB/1/VB" preComponent="silentSyn" postComponent="neuron_to_neuron_syn_x" weight="-8.133001982099486"/>
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        </continuousProjection>
        <continuousProjection id="NC_PopVA_PopVA_silentSyn" presynapticPopulation="PopVA" postsynapticPopulation="PopVA">
            <continuousConnectionInstanceW id="0" preCell="../PopVA/0/VA" postCell="../PopVA/0/VA" preComponent="silentSyn" postComponent="neuron_to_neuron_syn_x" weight="-0.600208490329953"/>
            <continuousConnectionInstanceW id="1" preCell="../PopVA/1/VA" postCell="../PopVA/1/VA" preComponent="silentSyn" postComponent="neuron_to_neuron_syn_x" weight="-0.600208490329953"/>
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        </continuousProjection>
        <continuousProjection id="NC_PopVD_PopVA_silentSyn" presynapticPopulation="PopVD" postsynapticPopulation="PopVA">
            <continuousConnectionInstanceW id="0" preCell="../PopVD/0/VD" postCell="../PopVA/0/VA" preComponent="silentSyn" postComponent="neuron_to_neuron_syn_x" weight="-6.719679883564599"/>
            <continuousConnectionInstanceW id="1" preCell="../PopVD/1/VD" postCell="../PopVA/1/VA" preComponent="silentSyn" postComponent="neuron_to_neuron_syn_x" weight="-6.719679883564599"/>
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        </continuousProjection>
        <continuousProjection id="NC_PopDB_PopDD_silentSyn" presynapticPopulation="PopDB" postsynapticPopulation="PopDD">
            <continuousConnectionInstanceW id="0" preCell="../PopDB/0/DB" postCell="../PopDD/1/DD" preComponent="silentSyn" postComponent="neuron_to_neuron_syn_x" weight="-14.934615973532601"/>
            <continuousConnectionInstanceW id="1" preCell="../PopDB/1/DB" postCell="../PopDD/2/DD" preComponent="silentSyn" postComponent="neuron_to_neuron_syn_x" weight="-14.934615973532601"/>
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        </continuousProjection>
        <inputList id="OneStim" population="PopDA" component="pulseGen_0">
            <inputW id="0" target="../PopDA/0/DA" destination="synapses" weight="1.0"/>
        </inputList>
        <inputList id="ExtStimPopAS" population="PopAS" component="extStim">
            <inputW id="0" target="../PopAS/0/AS" destination="synapses" weight="0.0"/>
            <inputW id="1" target="../PopAS/1/AS" destination="synapses" weight="0.0"/>
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        </inputList>
        <inputList id="ExtStimPopDA" population="PopDA" component="extStim">
            <inputW id="0" target="../PopDA/0/DA" destination="synapses" weight="0.0"/>
            <inputW id="1" target="../PopDA/1/DA" destination="synapses" weight="0.0"/>
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        </inputList>
        <inputList id="ExtStimPopDB" population="PopDB" component="extStim">
            <inputW id="0" target="../PopDB/0/DB" destination="synapses" weight="0.0"/>
            <inputW id="1" target="../PopDB/1/DB" destination="synapses" weight="0.0"/>
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        </inputList>
        <inputList id="ExtStimPopDD" population="PopDD" component="extStim">
            <inputW id="0" target="../PopDD/0/DD" destination="synapses" weight="0.0"/>
            <inputW id="1" target="../PopDD/1/DD" destination="synapses" weight="0.0"/>
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        </inputList>
        <inputList id="ExtStimPopVA" population="PopVA" component="extStim">
            <inputW id="0" target="../PopVA/0/VA" destination="synapses" weight="0.0"/>
            <inputW id="1" target="../PopVA/1/VA" destination="synapses" weight="0.0"/>
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        </inputList>
        <inputList id="ExtStimPopVB" population="PopVB" component="extStim">
            <inputW id="0" target="../PopVB/0/VB" destination="synapses" weight="0.0"/>
            <inputW id="1" target="../PopVB/1/VB" destination="synapses" weight="0.0"/>
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        </inputList>
        <inputList id="ExtStimPopVD" population="PopVD" component="extStim">
            <inputW id="0" target="../PopVD/0/VD" destination="synapses" weight="0.0"/>
            <inputW id="1" target="../PopVD/1/VD" destination="synapses" weight="0.0"/>
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        </inputList>
        <inputList id="ExtStimPopMD1" population="PopMD1" component="extStim">
            <inputW id="0" target="../PopMD1/0/MD1" destination="synapses" weight="0.0"/>
            <inputW id="1" target="../PopMD1/1/MD1" destination="synapses" weight="0.0"/>
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        </inputList>
        <inputList id="ExtStimPopMD2" population="PopMD2" component="extStim">
            <inputW id="0" target="../PopMD2/0/MD2" destination="synapses" weight="0.0"/>
            <inputW id="1" target="../PopMD2/1/MD2" destination="synapses" weight="0.0"/>
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        </inputList>
        <inputList id="ExtStimPopMD3" population="PopMD3" component="extStim">
            <inputW id="0" target="../PopMD3/0/MD3" destination="synapses" weight="0.0"/>
            <inputW id="1" target="../PopMD3/1/MD3" destination="synapses" weight="0.0"/>
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        </inputList>
        <inputList id="ExtStimPopMD4" population="PopMD4" component="extStim">
            <inputW id="0" target="../PopMD4/0/MD4" destination="synapses" weight="0.0"/>
            <inputW id="1" target="../PopMD4/1/MD4" destination="synapses" weight="0.0"/>
            <inputW id="2" target="../PopMD4/2/MD4" destination="synapses" weight="0.0"/>
        </inputList>
        <inputList id="ExtStimPopMV1" population="PopMV1" component="extStim">
            <inputW id="0" target="../PopMV1/0/MV1" destination="synapses" weight="0.0"/>
            <inputW id="1" target="../PopMV1/1/MV1" destination="synapses" weight="0.0"/>
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        </inputList>
        <inputList id="ExtStimPopMV2" population="PopMV2" component="extStim">
            <inputW id="0" target="../PopMV2/0/MV2" destination="synapses" weight="0.0"/>
            <inputW id="1" target="../PopMV2/1/MV2" destination="synapses" weight="0.0"/>
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        </inputList>
        <inputList id="ExtStimPopMV3" population="PopMV3" component="extStim">
            <inputW id="0" target="../PopMV3/0/MV3" destination="synapses" weight="0.0"/>
            <inputW id="1" target="../PopMV3/1/MV3" destination="synapses" weight="0.0"/>
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        </inputList>
        <inputList id="ExtStimPopMV4" population="PopMV4" component="extStim">
            <inputW id="0" target="../PopMV4/0/MV4" destination="synapses" weight="0.0"/>
            <inputW id="1" target="../PopMV4/1/MV4" destination="synapses" weight="0.0"/>
            <inputW id="2" target="../PopMV4/2/MV4" destination="synapses" weight="0.0"/>
        </inputList>
    </network>
</neuroml>
