<Lems>
<cellW2D id="AS" bias="-0.4248175272106998" gain="1.0" state0="0.4248175272106998" tau="0.3011426425346604s"/>
<cellW2D id="DA" bias="-4.908344110612691" gain="1.0" state0="4.908344110612691" tau="0.9720731728196139s"/>
<cellW2D id="DB" bias="-3.4275628465609955" gain="1.0" state0="3.4275628465609955" tau="0.20766071307113432s"/>
<cellW2D id="DD" bias="14.993011342898201" gain="1.0" state0="-14.993011342898201" tau="2.444923759681969s"/>
<cellW2D id="VA" bias="-9.147556600637067" gain="1.0" state0="9.147556600637065" tau="0.5385171296590928s"/>
<cellW2D id="VB" bias="-0.5481398276933908" gain="1.0" state0="0.5481398276933908" tau="0.8520464636376486s"/>
<cellW2D id="VD" bias="-2.7991718690668597" gain="1.0" state0="2.7991718690668597" tau="0.45670898474323085s"/>
</Lems>
