<Lems>
<cellW2Dosc id="ND0" amp="1.0" freq="0.44004767609535556" phase="5.47180724796941" timestep="0.005" state0="0"/>
<cellW2Dosc id="ND1" amp="1.0" freq="0.44004767609535556" phase="11.62774149385693" timestep="0.005" state0="0"/>
<cellW2Dosc id="ND10" amp="1.0" freq="0.44004767609535556" phase="67.03114970684462" timestep="0.005" state0="0"/>
<cellW2Dosc id="ND11" amp="1.0" freq="0.44004767609535556" phase="73.18708395273214" timestep="0.005" state0="0"/>
<cellW2Dosc id="ND12" amp="1.0" freq="0.44004767609535556" phase="79.34301819861965" timestep="0.005" state0="0"/>
<cellW2Dosc id="ND13" amp="1.0" freq="0.44004767609535556" phase="85.49895244450717" timestep="0.005" state0="0"/>
<cellW2Dosc id="ND14" amp="1.0" freq="0.44004767609535556" phase="91.65488669039469" timestep="0.005" state0="0"/>
<cellW2Dosc id="ND15" amp="1.0" freq="0.44004767609535556" phase="97.81082093628221" timestep="0.005" state0="0"/>
<cellW2Dosc id="ND16" amp="1.0" freq="0.44004767609535556" phase="103.96675518216973" timestep="0.005" state0="0"/>
<cellW2Dosc id="ND17" amp="1.0" freq="0.44004767609535556" phase="110.12268942805726" timestep="0.005" state0="0"/>
<cellW2Dosc id="ND18" amp="1.0" freq="0.44004767609535556" phase="116.27862367394478" timestep="0.005" state0="0"/>
<cellW2Dosc id="ND19" amp="1.0" freq="0.44004767609535556" phase="122.4345579198323" timestep="0.005" state0="0"/>
<cellW2Dosc id="ND2" amp="1.0" freq="0.44004767609535556" phase="17.783675739744453" timestep="0.005" state0="0"/>
<cellW2Dosc id="ND20" amp="1.0" freq="0.44004767609535556" phase="128.59049216571984" timestep="0.005" state0="0"/>
<cellW2Dosc id="ND21" amp="1.0" freq="0.44004767609535556" phase="134.74642641160736" timestep="0.005" state0="0"/>
<cellW2Dosc id="ND22" amp="1.0" freq="0.44004767609535556" phase="140.90236065749488" timestep="0.005" state0="0"/>
<cellW2Dosc id="ND23" amp="1.0" freq="0.44004767609535556" phase="147.0582949033824" timestep="0.005" state0="0"/>
<cellW2Dosc id="ND3" amp="1.0" freq="0.44004767609535556" phase="23.939609985631968" timestep="0.005" state0="0"/>
<cellW2Dosc id="ND4" amp="1.0" freq="0.44004767609535556" phase="30.09554423151949" timestep="0.005" state0="0"/>
<cellW2Dosc id="ND5" amp="1.0" freq="0.44004767609535556" phase="36.25147847740701" timestep="0.005" state0="0"/>
<cellW2Dosc id="ND6" amp="1.0" freq="0.44004767609535556" phase="42.40741272329453" timestep="0.005" state0="0"/>
<cellW2Dosc id="ND7" amp="1.0" freq="0.44004767609535556" phase="48.56334696918205" timestep="0.005" state0="0"/>
<cellW2Dosc id="ND8" amp="1.0" freq="0.44004767609535556" phase="54.71928121506957" timestep="0.005" state0="0"/>
<cellW2Dosc id="ND9" amp="1.0" freq="0.44004767609535556" phase="60.875215460957094" timestep="0.005" state0="0"/>
<cellW2Dosc id="NV0" amp="1.0" freq="0.44004767609535556" phase="0.0" timestep="0.005" state0="0"/>
<cellW2Dosc id="NV1" amp="1.0" freq="0.44004767609535556" phase="6.15593424588752" timestep="0.005" state0="0"/>
<cellW2Dosc id="NV10" amp="1.0" freq="0.44004767609535556" phase="61.55934245887521" timestep="0.005" state0="0"/>
<cellW2Dosc id="NV11" amp="1.0" freq="0.44004767609535556" phase="67.71527670476273" timestep="0.005" state0="0"/>
<cellW2Dosc id="NV12" amp="1.0" freq="0.44004767609535556" phase="73.87121095065024" timestep="0.005" state0="0"/>
<cellW2Dosc id="NV13" amp="1.0" freq="0.44004767609535556" phase="80.02714519653776" timestep="0.005" state0="0"/>
<cellW2Dosc id="NV14" amp="1.0" freq="0.44004767609535556" phase="86.18307944242528" timestep="0.005" state0="0"/>
<cellW2Dosc id="NV15" amp="1.0" freq="0.44004767609535556" phase="92.3390136883128" timestep="0.005" state0="0"/>
<cellW2Dosc id="NV16" amp="1.0" freq="0.44004767609535556" phase="98.49494793420033" timestep="0.005" state0="0"/>
<cellW2Dosc id="NV17" amp="1.0" freq="0.44004767609535556" phase="104.65088218008785" timestep="0.005" state0="0"/>
<cellW2Dosc id="NV18" amp="1.0" freq="0.44004767609535556" phase="110.80681642597537" timestep="0.005" state0="0"/>
<cellW2Dosc id="NV19" amp="1.0" freq="0.44004767609535556" phase="116.96275067186289" timestep="0.005" state0="0"/>
<cellW2Dosc id="NV2" amp="1.0" freq="0.44004767609535556" phase="12.31186849177504" timestep="0.005" state0="0"/>
<cellW2Dosc id="NV20" amp="1.0" freq="0.44004767609535556" phase="123.11868491775041" timestep="0.005" state0="0"/>
<cellW2Dosc id="NV21" amp="1.0" freq="0.44004767609535556" phase="129.27461916363794" timestep="0.005" state0="0"/>
<cellW2Dosc id="NV22" amp="1.0" freq="0.44004767609535556" phase="135.43055340952546" timestep="0.005" state0="0"/>
<cellW2Dosc id="NV23" amp="1.0" freq="0.44004767609535556" phase="141.58648765541298" timestep="0.005" state0="0"/>
<cellW2Dosc id="NV3" amp="1.0" freq="0.44004767609535556" phase="18.46780273766256" timestep="0.005" state0="0"/>
<cellW2Dosc id="NV4" amp="1.0" freq="0.44004767609535556" phase="24.62373698355008" timestep="0.005" state0="0"/>
<cellW2Dosc id="NV5" amp="1.0" freq="0.44004767609535556" phase="30.779671229437604" timestep="0.005" state0="0"/>
<cellW2Dosc id="NV6" amp="1.0" freq="0.44004767609535556" phase="36.93560547532512" timestep="0.005" state0="0"/>
<cellW2Dosc id="NV7" amp="1.0" freq="0.44004767609535556" phase="43.09153972121264" timestep="0.005" state0="0"/>
<cellW2Dosc id="NV8" amp="1.0" freq="0.44004767609535556" phase="49.24747396710016" timestep="0.005" state0="0"/>
<cellW2Dosc id="NV9" amp="1.0" freq="0.44004767609535556" phase="55.403408212987685" timestep="0.005" state0="0"/>
</Lems>
