<neuroml xmlns="http://www.neuroml.org/schema/neuroml2"  xmlns:xs="http://www.w3.org/2001/XMLSchema" xmlns:xsi="http://www.w3.org/2001/XMLSchema-instance" xsi:schemaLocation="http://www.neuroml.org/schema/neuroml2 https://raw.github.com/NeuroML/NeuroML2/development/Schemas/NeuroML2/NeuroML_v2.3.1.xsd" id="Worm2D">
    <network id="Worm2DNet">
        <population id="PopND0" component="ND0" size="1" type="populationList">
            <instance id="0">
                <location x="6.540656482581941" y="67.260339531705938" z="0.0"/>
            </instance>
        </population>
        <population id="PopND1" component="ND1" size="1" type="populationList">
            <instance id="0">
                <location x="59.358102086837739" y="66.125500764747287" z="0.0"/>
            </instance>
        </population>
        <population id="PopND2" component="ND2" size="1" type="populationList">
            <instance id="0">
                <location x="34.450608302997331" y="15.710611404384622" z="0.0"/>
            </instance>
        </population>
        <population id="PopND3" component="ND3" size="1" type="populationList">
            <instance id="0">
                <location x="42.358843793828726" y="63.104157256446072" z="0.0"/>
            </instance>
        </population>
        <population id="PopND4" component="ND4" size="1" type="populationList">
            <instance id="0">
                <location x="0.552962451258587" y="32.587928889625573" z="0.0"/>
            </instance>
        </population>
        <population id="PopND5" component="ND5" size="1" type="populationList">
            <instance id="0">
                <location x="41.061117246909959" y="26.518088846704714" z="0.0"/>
            </instance>
        </population>
        <population id="PopND6" component="ND6" size="1" type="populationList">
            <instance id="0">
                <location x="61.051874479586651" y="92.584182286467993" z="0.0"/>
            </instance>
        </population>
        <population id="PopNV0" component="NV0" size="1" type="populationList">
            <instance id="0">
                <location x="96.724790322359155" y="75.55897446817481" z="0.0"/>
            </instance>
        </population>
        <population id="PopNV1" component="NV1" size="1" type="populationList">
            <instance id="0">
                <location x="74.724486345408394" y="65.184563267699374" z="0.0"/>
            </instance>
        </population>
        <population id="PopNV2" component="NV2" size="1" type="populationList">
            <instance id="0">
                <location x="1.23269424403013" y="24.466790029730735" z="0.0"/>
            </instance>
        </population>
        <population id="PopNV3" component="NV3" size="1" type="populationList">
            <instance id="0">
                <location x="19.488127341809747" y="53.008378676539181" z="0.0"/>
            </instance>
        </population>
        <population id="PopNV4" component="NV4" size="1" type="populationList">
            <instance id="0">
                <location x="9.213266197605407" y="62.936119864456607" z="0.0"/>
            </instance>
        </population>
        <population id="PopNV5" component="NV5" size="1" type="populationList">
            <instance id="0">
                <location x="13.393437781240824" y="55.858851387416884" z="0.0"/>
            </instance>
        </population>
        <population id="PopNV6" component="NV6" size="1" type="populationList">
            <instance id="0">
                <location x="37.542762179038256" y="63.845687231601126" z="0.0"/>
            </instance>
        </population>
    </network>
</neuroml>
