<Lems>
<cellW2Dosc id="ND0" amp="1.0" freq="0.4394970364986821" phase="0.0"/>
<cellW2Dosc id="ND1" amp="1.0" freq="0.4394970364986821" phase="5.964075454994395"/>
<cellW2Dosc id="ND2" amp="1.0" freq="0.4394970364986821" phase="11.92815090998879"/>
<cellW2Dosc id="ND3" amp="1.0" freq="0.4394970364986821" phase="17.892226364983188"/>
<cellW2Dosc id="ND4" amp="1.0" freq="0.4394970364986821" phase="23.85630181997758"/>
<cellW2Dosc id="ND5" amp="1.0" freq="0.4394970364986821" phase="29.820377274971975"/>
<cellW2Dosc id="ND6" amp="1.0" freq="0.4394970364986821" phase="35.784452729966375"/>
<cellW2Dosc id="NV0" amp="1.0" freq="0.4394970364986821" phase="3.644976566200049"/>
<cellW2Dosc id="NV1" amp="1.0" freq="0.4394970364986821" phase="9.609052021194444"/>
<cellW2Dosc id="NV2" amp="1.0" freq="0.4394970364986821" phase="15.573127476188839"/>
<cellW2Dosc id="NV3" amp="1.0" freq="0.4394970364986821" phase="21.537202931183238"/>
<cellW2Dosc id="NV4" amp="1.0" freq="0.4394970364986821" phase="27.50127838617763"/>
<cellW2Dosc id="NV5" amp="1.0" freq="0.4394970364986821" phase="33.465353841172025"/>
<cellW2Dosc id="NV6" amp="1.0" freq="0.4394970364986821" phase="39.429429296166425"/>
</Lems>
