<neuroml xmlns="http://www.neuroml.org/schema/neuroml2"  xmlns:xs="http://www.w3.org/2001/XMLSchema" xmlns:xsi="http://www.w3.org/2001/XMLSchema-instance" xsi:schemaLocation="http://www.neuroml.org/schema/neuroml2 https://raw.github.com/NeuroML/NeuroML2/development/Schemas/NeuroML2/NeuroML_v2.3.1.xsd" id="Worm2D">
    <include href="cell_syn_X.xml"/>
    <include href="cell_syn_X_cells.xml"/>
    <pulseGenerator id="pulseGen_0" delay="200ms" duration="10ms" amplitude="0.080320 nA"/>
    <pulseGenerator id="pulseGen_1" delay="200ms" duration="10ms" amplitude="0.025301 nA"/>
    <pulseGenerator id="pulseGen_2" delay="200ms" duration="10ms" amplitude="0.069099 nA"/>
    <pulseGenerator id="pulseGen_3" delay="200ms" duration="10ms" amplitude="0.031894 nA"/>
    <pulseGenerator id="pulseGen_4" delay="200ms" duration="10ms" amplitude="0.029783 nA"/>
    <pulseGenerator id="pulseGen_5" delay="200ms" duration="10ms" amplitude="0.088521 nA"/>
    <pulseGenerator id="pulseGen_6" delay="200ms" duration="10ms" amplitude="0.003688 nA"/>
    <pulseGenerator id="pulseGen_7" delay="200ms" duration="10ms" amplitude="0.061839 nA"/>
    <pulseGenerator id="pulseGen_8" delay="200ms" duration="10ms" amplitude="0.091077 nA"/>
    <pulseGenerator id="pulseGen_9" delay="200ms" duration="10ms" amplitude="0.037993 nA"/>
    <network id="Worm2DNet">
        <population id="PopDA" component="DA" size="10"/>
        <population id="PopDB" component="DB" size="10"/>
        <population id="PopDD" component="DD" size="10"/>
        <population id="PopVD" component="VD" size="10"/>
        <population id="PopVA" component="VA" size="10"/>
        <population id="PopVB" component="VB" size="10"/>
        <electricalProjection id="NC_PopDB_PopDB_gapJunction0" presynapticPopulation="PopDB" postsynapticPopulation="PopDB">
            <electricalConnectionInstanceW id="0" preCell="../PopDB[1]" postCell="../PopDB[0]" synapse="gapJunction0" weight="0.111893748558795"/>
            <electricalConnectionInstanceW id="1" preCell="../PopDB[0]" postCell="../PopDB[1]" synapse="gapJunction0" weight="0.111893748558795"/>
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        </electricalProjection>
        <electricalProjection id="NC_PopDD_PopDD_gapJunction0" presynapticPopulation="PopDD" postsynapticPopulation="PopDD">
            <electricalConnectionInstanceW id="0" preCell="../PopDD[1]" postCell="../PopDD[0]" synapse="gapJunction0" weight="1.626882458649384"/>
            <electricalConnectionInstanceW id="1" preCell="../PopDD[0]" postCell="../PopDD[1]" synapse="gapJunction0" weight="1.626882458649384"/>
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        </electricalProjection>
        <electricalProjection id="NC_PopVD_PopVD_gapJunction0" presynapticPopulation="PopVD" postsynapticPopulation="PopVD">
            <electricalConnectionInstanceW id="0" preCell="../PopVD[1]" postCell="../PopVD[0]" synapse="gapJunction0" weight="1.626882458649384"/>
            <electricalConnectionInstanceW id="1" preCell="../PopVD[0]" postCell="../PopVD[1]" synapse="gapJunction0" weight="1.626882458649384"/>
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        </electricalProjection>
        <electricalProjection id="NC_PopVB_PopVB_gapJunction0" presynapticPopulation="PopVB" postsynapticPopulation="PopVB">
            <electricalConnectionInstanceW id="0" preCell="../PopVB[1]" postCell="../PopVB[0]" synapse="gapJunction0" weight="0.111893748558795"/>
            <electricalConnectionInstanceW id="1" preCell="../PopVB[0]" postCell="../PopVB[1]" synapse="gapJunction0" weight="0.111893748558795"/>
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        </electricalProjection>
        <continuousProjection id="NC_PopDA_PopDA_silentSyn" presynapticPopulation="PopDA" postsynapticPopulation="PopDA">
            <continuousConnectionInstanceW id="0" preCell="../PopDA[0]" postCell="../PopDA[0]" preComponent="silentSyn" postComponent="neuron_to_neuron_syn_x" weight="-2.528311446261591"/>
            <continuousConnectionInstanceW id="1" preCell="../PopDA[1]" postCell="../PopDA[1]" preComponent="silentSyn" postComponent="neuron_to_neuron_syn_x" weight="-2.528311446261591"/>
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        </continuousProjection>
        <continuousProjection id="NC_PopDD_PopDA_silentSyn" presynapticPopulation="PopDD" postsynapticPopulation="PopDA">
            <continuousConnectionInstanceW id="0" preCell="../PopDD[0]" postCell="../PopDA[0]" preComponent="silentSyn" postComponent="neuron_to_neuron_syn_x" weight="-14.672044016483778"/>
            <continuousConnectionInstanceW id="1" preCell="../PopDD[1]" postCell="../PopDA[1]" preComponent="silentSyn" postComponent="neuron_to_neuron_syn_x" weight="-14.672044016483778"/>
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        </continuousProjection>
        <continuousProjection id="NC_PopDB_PopDB_silentSyn" presynapticPopulation="PopDB" postsynapticPopulation="PopDB">
            <continuousConnectionInstanceW id="0" preCell="../PopDB[0]" postCell="../PopDB[0]" preComponent="silentSyn" postComponent="neuron_to_neuron_syn_x" weight="-5.431573678563159"/>
            <continuousConnectionInstanceW id="1" preCell="../PopDB[1]" postCell="../PopDB[1]" preComponent="silentSyn" postComponent="neuron_to_neuron_syn_x" weight="-5.431573678563159"/>
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        </continuousProjection>
        <continuousProjection id="NC_PopDD_PopDB_silentSyn" presynapticPopulation="PopDD" postsynapticPopulation="PopDB">
            <continuousConnectionInstanceW id="0" preCell="../PopDD[0]" postCell="../PopDB[0]" preComponent="silentSyn" postComponent="neuron_to_neuron_syn_x" weight="-1.110075444163887"/>
            <continuousConnectionInstanceW id="1" preCell="../PopDD[1]" postCell="../PopDB[1]" preComponent="silentSyn" postComponent="neuron_to_neuron_syn_x" weight="-1.110075444163887"/>
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        </continuousProjection>
        <continuousProjection id="NC_PopDD_PopDD_silentSyn" presynapticPopulation="PopDD" postsynapticPopulation="PopDD">
            <continuousConnectionInstanceW id="0" preCell="../PopDD[0]" postCell="../PopDD[0]" preComponent="silentSyn" postComponent="neuron_to_neuron_syn_x" weight="0.43417780432587"/>
            <continuousConnectionInstanceW id="1" preCell="../PopDD[1]" postCell="../PopDD[1]" preComponent="silentSyn" postComponent="neuron_to_neuron_syn_x" weight="0.43417780432587"/>
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        </continuousProjection>
        <continuousProjection id="NC_PopVA_PopDD_silentSyn" presynapticPopulation="PopVA" postsynapticPopulation="PopDD">
            <continuousConnectionInstanceW id="0" preCell="../PopVA[0]" postCell="../PopDD[0]" preComponent="silentSyn" postComponent="neuron_to_neuron_syn_x" weight="1.688431247680192"/>
            <continuousConnectionInstanceW id="1" preCell="../PopVA[1]" postCell="../PopDD[1]" preComponent="silentSyn" postComponent="neuron_to_neuron_syn_x" weight="1.688431247680192"/>
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        </continuousProjection>
        <continuousProjection id="NC_PopVB_PopDD_silentSyn" presynapticPopulation="PopVB" postsynapticPopulation="PopDD">
            <continuousConnectionInstanceW id="0" preCell="../PopVB[0]" postCell="../PopDD[0]" preComponent="silentSyn" postComponent="neuron_to_neuron_syn_x" weight="5.038926703654519"/>
            <continuousConnectionInstanceW id="1" preCell="../PopVB[1]" postCell="../PopDD[1]" preComponent="silentSyn" postComponent="neuron_to_neuron_syn_x" weight="5.038926703654519"/>
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        </continuousProjection>
        <continuousProjection id="NC_PopVD_PopVD_silentSyn" presynapticPopulation="PopVD" postsynapticPopulation="PopVD">
            <continuousConnectionInstanceW id="0" preCell="../PopVD[0]" postCell="../PopVD[0]" preComponent="silentSyn" postComponent="neuron_to_neuron_syn_x" weight="0.43417780432587"/>
            <continuousConnectionInstanceW id="1" preCell="../PopVD[1]" postCell="../PopVD[1]" preComponent="silentSyn" postComponent="neuron_to_neuron_syn_x" weight="0.43417780432587"/>
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        </continuousProjection>
        <continuousProjection id="NC_PopDA_PopVD_silentSyn" presynapticPopulation="PopDA" postsynapticPopulation="PopVD">
            <continuousConnectionInstanceW id="0" preCell="../PopDA[0]" postCell="../PopVD[0]" preComponent="silentSyn" postComponent="neuron_to_neuron_syn_x" weight="1.688431247680192"/>
            <continuousConnectionInstanceW id="1" preCell="../PopDA[1]" postCell="../PopVD[1]" preComponent="silentSyn" postComponent="neuron_to_neuron_syn_x" weight="1.688431247680192"/>
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        </continuousProjection>
        <continuousProjection id="NC_PopDB_PopVD_silentSyn" presynapticPopulation="PopDB" postsynapticPopulation="PopVD">
            <continuousConnectionInstanceW id="0" preCell="../PopDB[0]" postCell="../PopVD[0]" preComponent="silentSyn" postComponent="neuron_to_neuron_syn_x" weight="5.038926703654519"/>
            <continuousConnectionInstanceW id="1" preCell="../PopDB[1]" postCell="../PopVD[1]" preComponent="silentSyn" postComponent="neuron_to_neuron_syn_x" weight="5.038926703654519"/>
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        </continuousProjection>
        <continuousProjection id="NC_PopVA_PopVA_silentSyn" presynapticPopulation="PopVA" postsynapticPopulation="PopVA">
            <continuousConnectionInstanceW id="0" preCell="../PopVA[0]" postCell="../PopVA[0]" preComponent="silentSyn" postComponent="neuron_to_neuron_syn_x" weight="-2.528311446261591"/>
            <continuousConnectionInstanceW id="1" preCell="../PopVA[1]" postCell="../PopVA[1]" preComponent="silentSyn" postComponent="neuron_to_neuron_syn_x" weight="-2.528311446261591"/>
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        </continuousProjection>
        <continuousProjection id="NC_PopVD_PopVA_silentSyn" presynapticPopulation="PopVD" postsynapticPopulation="PopVA">
            <continuousConnectionInstanceW id="0" preCell="../PopVD[0]" postCell="../PopVA[0]" preComponent="silentSyn" postComponent="neuron_to_neuron_syn_x" weight="-14.672044016483778"/>
            <continuousConnectionInstanceW id="1" preCell="../PopVD[1]" postCell="../PopVA[1]" preComponent="silentSyn" postComponent="neuron_to_neuron_syn_x" weight="-14.672044016483778"/>
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        </continuousProjection>
        <continuousProjection id="NC_PopVB_PopVB_silentSyn" presynapticPopulation="PopVB" postsynapticPopulation="PopVB">
            <continuousConnectionInstanceW id="0" preCell="../PopVB[0]" postCell="../PopVB[0]" preComponent="silentSyn" postComponent="neuron_to_neuron_syn_x" weight="-5.431573678563159"/>
            <continuousConnectionInstanceW id="1" preCell="../PopVB[1]" postCell="../PopVB[1]" preComponent="silentSyn" postComponent="neuron_to_neuron_syn_x" weight="-5.431573678563159"/>
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        </continuousProjection>
        <continuousProjection id="NC_PopVD_PopVB_silentSyn" presynapticPopulation="PopVD" postsynapticPopulation="PopVB">
            <continuousConnectionInstanceW id="0" preCell="../PopVD[0]" postCell="../PopVB[0]" preComponent="silentSyn" postComponent="neuron_to_neuron_syn_x" weight="-1.110075444163887"/>
            <continuousConnectionInstanceW id="1" preCell="../PopVD[1]" postCell="../PopVB[1]" preComponent="silentSyn" postComponent="neuron_to_neuron_syn_x" weight="-1.110075444163887"/>
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        </continuousProjection>
        <explicitInput target="PopDA[0]" input="pulseGen_0"/>
        <explicitInput target="PopDA[1]" input="pulseGen_1"/>
        <explicitInput target="PopDA[2]" input="pulseGen_2"/>
        <explicitInput target="PopDA[3]" input="pulseGen_3"/>
        <explicitInput target="PopDA[4]" input="pulseGen_4"/>
        <explicitInput target="PopDA[5]" input="pulseGen_5"/>
        <explicitInput target="PopDA[6]" input="pulseGen_6"/>
        <explicitInput target="PopDA[7]" input="pulseGen_7"/>
        <explicitInput target="PopDA[8]" input="pulseGen_8"/>
        <explicitInput target="PopDA[9]" input="pulseGen_9"/>
    </network>
</neuroml>
