<neuroml xmlns="http://www.neuroml.org/schema/neuroml2"  xmlns:xs="http://www.w3.org/2001/XMLSchema" xmlns:xsi="http://www.w3.org/2001/XMLSchema-instance" xsi:schemaLocation="http://www.neuroml.org/schema/neuroml2 https://raw.github.com/NeuroML/NeuroML2/development/Schemas/NeuroML2/NeuroML_v2.3.1.xsd" id="Worm2D">
    <pulseGenerator id="pulseGen_0" delay="20s" duration="10s" amplitude="10.000000 pA"/>
    <pulseGenerator id="extStim" delay="0s" duration="10000s" amplitude="1 pA"/>
    <network id="Worm2DNet">
        <population id="PopAS" component="AS" size="7" type="populationList">
            <property tag="type" value="I"/>
            <instance id="0">
                <location x="0.0" y="0.0" z="0.0"/>
            </instance>
            <instance id="1">
                <location x="0.0" y="0.0" z="100.0"/>
            </instance>
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        </population>
        <population id="PopDA" component="DA" size="7" type="populationList">
            <property tag="type" value="E"/>
            <instance id="0">
                <location x="100.0" y="-100.0" z="0.0"/>
            </instance>
            <instance id="1">
                <location x="100.0" y="-100.0" z="100.0"/>
            </instance>
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        </population>
        <population id="PopDB" component="DB" size="7" type="populationList">
            <property tag="type" value="E"/>
            <instance id="0">
                <location x="100.0" y="0.0" z="0.0"/>
            </instance>
            <instance id="1">
                <location x="100.0" y="0.0" z="100.0"/>
            </instance>
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        </population>
        <population id="PopDD" component="DD" size="7" type="populationList">
            <property tag="type" value="I"/>
            <instance id="0">
                <location x="100.0" y="100.0" z="0.0"/>
            </instance>
            <instance id="1">
                <location x="100.0" y="100.0" z="100.0"/>
            </instance>
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        </population>
        <population id="PopVA" component="VA" size="7" type="populationList">
            <property tag="type" value="E"/>
            <instance id="0">
                <location x="-100.0" y="-100.0" z="0.0"/>
            </instance>
            <instance id="1">
                <location x="-100.0" y="-100.0" z="100.0"/>
            </instance>
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        </population>
        <population id="PopVB" component="VB" size="7" type="populationList">
            <property tag="type" value="E"/>
            <instance id="0">
                <location x="-100.0" y="0.0" z="0.0"/>
            </instance>
            <instance id="1">
                <location x="-100.0" y="0.0" z="100.0"/>
            </instance>
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        </population>
        <population id="PopVD" component="VD" size="7" type="populationList">
            <property tag="type" value="I"/>
            <instance id="0">
                <location x="-100.0" y="100.0" z="0.0"/>
            </instance>
            <instance id="1">
                <location x="-100.0" y="100.0" z="100.0"/>
            </instance>
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        </population>
        <population id="PopMV1" component="MV1" size="24" type="populationList">
            <property tag="type" value="E"/>
            <instance id="0">
                <location x="100.0" y="100.0" z="0.0"/>
            </instance>
            <instance id="1">
                <location x="100.0" y="100.0" z="100.0"/>
            </instance>
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        </population>
        <population id="PopMD1" component="MD1" size="24" type="populationList">
            <property tag="type" value="E"/>
            <instance id="0">
                <location x="100.0" y="100.0" z="0.0"/>
            </instance>
            <instance id="1">
                <location x="100.0" y="100.0" z="100.0"/>
            </instance>
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        </population>
        <electricalProjection id="NC_PopVA_PopAS_gapJunction0" presynapticPopulation="PopVA" postsynapticPopulation="PopAS">
            <electricalConnectionInstanceW id="0" preCell="../PopVA/1/VA" postCell="../PopAS/0/AS" synapse="gapJunction0" weight="0.807852623764661"/>
            <electricalConnectionInstanceW id="1" preCell="../PopVA/2/VA" postCell="../PopAS/1/AS" synapse="gapJunction0" weight="0.807852623764661"/>
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        </electricalProjection>
        <electricalProjection id="NC_PopAS_PopDA_gapJunction0" presynapticPopulation="PopAS" postsynapticPopulation="PopDA">
            <electricalConnectionInstanceW id="0" preCell="../PopAS/1/AS" postCell="../PopDA/0/DA" synapse="gapJunction0" weight="0.020426064631231"/>
            <electricalConnectionInstanceW id="1" preCell="../PopAS/2/AS" postCell="../PopDA/1/DA" synapse="gapJunction0" weight="0.020426064631231"/>
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        </electricalProjection>
        <electricalProjection id="NC_PopVD_PopDD_gapJunction0" presynapticPopulation="PopVD" postsynapticPopulation="PopDD">
            <electricalConnectionInstanceW id="0" preCell="../PopVD/0/VD" postCell="../PopDD/0/DD" synapse="gapJunction0" weight="0.444301377323279"/>
            <electricalConnectionInstanceW id="1" preCell="../PopVD/1/VD" postCell="../PopDD/1/DD" synapse="gapJunction0" weight="0.444301377323279"/>
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        </electricalProjection>
        <electricalProjection id="NC_PopDD_PopVD_gapJunction0" presynapticPopulation="PopDD" postsynapticPopulation="PopVD">
            <electricalConnectionInstanceW id="0" preCell="../PopDD/0/DD" postCell="../PopVD/0/VD" synapse="gapJunction0" weight="0.444301377323279"/>
            <electricalConnectionInstanceW id="1" preCell="../PopDD/1/DD" postCell="../PopVD/1/VD" synapse="gapJunction0" weight="0.444301377323279"/>
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        </electricalProjection>
        <electricalProjection id="NC_PopDB_PopVB_gapJunction0" presynapticPopulation="PopDB" postsynapticPopulation="PopVB">
            <electricalConnectionInstanceW id="0" preCell="../PopDB/1/DB" postCell="../PopVB/0/VB" synapse="gapJunction0" weight="0.838529881301883"/>
            <electricalConnectionInstanceW id="1" preCell="../PopDB/2/DB" postCell="../PopVB/1/VB" synapse="gapJunction0" weight="0.838529881301883"/>
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        </electricalProjection>
        <electricalProjection id="NC_PopDA_PopAS_gapJunction0" presynapticPopulation="PopDA" postsynapticPopulation="PopAS">
            <electricalConnectionInstanceW id="0" preCell="../PopDA/0/DA" postCell="../PopAS/1/AS" synapse="gapJunction0" weight="0.020426064631231"/>
            <electricalConnectionInstanceW id="1" preCell="../PopDA/1/DA" postCell="../PopAS/2/AS" synapse="gapJunction0" weight="0.020426064631231"/>
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        </electricalProjection>
        <electricalProjection id="NC_PopVB_PopDB_gapJunction0" presynapticPopulation="PopVB" postsynapticPopulation="PopDB">
            <electricalConnectionInstanceW id="0" preCell="../PopVB/0/VB" postCell="../PopDB/1/DB" synapse="gapJunction0" weight="0.838529881301883"/>
            <electricalConnectionInstanceW id="1" preCell="../PopVB/1/VB" postCell="../PopDB/2/DB" synapse="gapJunction0" weight="0.838529881301883"/>
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        </electricalProjection>
        <electricalProjection id="NC_PopAS_PopVA_gapJunction0" presynapticPopulation="PopAS" postsynapticPopulation="PopVA">
            <electricalConnectionInstanceW id="0" preCell="../PopAS/0/AS" postCell="../PopVA/1/VA" synapse="gapJunction0" weight="0.807852623764661"/>
            <electricalConnectionInstanceW id="1" preCell="../PopAS/1/AS" postCell="../PopVA/2/VA" synapse="gapJunction0" weight="0.807852623764661"/>
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        </electricalProjection>
        <continuousProjection id="NC_PopAS_PopMV1_silentSyn" presynapticPopulation="PopAS" postsynapticPopulation="PopMV1">
            <continuousConnectionInstanceW id="0" preCell="../PopAS/0/AS" postCell="../PopMV1/0/MV1" preComponent="silentSyn" postComponent="neuron_to_neuron_syn_x" weight="0.000767686528251"/>
            <continuousConnectionInstanceW id="1" preCell="../PopAS/0/AS" postCell="../PopMV1/1/MV1" preComponent="silentSyn" postComponent="neuron_to_neuron_syn_x" weight="0.000748150923528"/>
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        </continuousProjection>
        <continuousProjection id="NC_PopDA_PopMV1_silentSyn" presynapticPopulation="PopDA" postsynapticPopulation="PopMV1">
            <continuousConnectionInstanceW id="0" preCell="../PopDA/0/DA" postCell="../PopMV1/0/MV1" preComponent="silentSyn" postComponent="neuron_to_neuron_syn_x" weight="0.136963610910313"/>
            <continuousConnectionInstanceW id="1" preCell="../PopDA/0/DA" postCell="../PopMV1/1/MV1" preComponent="silentSyn" postComponent="neuron_to_neuron_syn_x" weight="0.133478246942473"/>
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        </continuousProjection>
        <continuousProjection id="NC_PopDB_PopMV1_silentSyn" presynapticPopulation="PopDB" postsynapticPopulation="PopMV1">
            <continuousConnectionInstanceW id="0" preCell="../PopDB/0/DB" postCell="../PopMV1/0/MV1" preComponent="silentSyn" postComponent="neuron_to_neuron_syn_x" weight="0.84"/>
            <continuousConnectionInstanceW id="1" preCell="../PopDB/0/DB" postCell="../PopMV1/1/MV1" preComponent="silentSyn" postComponent="neuron_to_neuron_syn_x" weight="0.818624207455347"/>
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        </continuousProjection>
        <continuousProjection id="NC_PopDD_PopMV1_silentSyn" presynapticPopulation="PopDD" postsynapticPopulation="PopMV1">
            <continuousConnectionInstanceW id="0" preCell="../PopDD/0/DD" postCell="../PopMV1/0/MV1" preComponent="silentSyn" postComponent="neuron_to_neuron_syn_x" weight="-0.631746313180336"/>
            <continuousConnectionInstanceW id="1" preCell="../PopDD/0/DD" postCell="../PopMV1/1/MV1" preComponent="silentSyn" postComponent="neuron_to_neuron_syn_x" weight="-0.615670029690584"/>
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        </continuousProjection>
        <continuousProjection id="NC_PopVD_PopMD1_silentSyn" presynapticPopulation="PopVD" postsynapticPopulation="PopMD1">
            <continuousConnectionInstanceW id="0" preCell="../PopVD/0/VD" postCell="../PopMD1/0/MD1" preComponent="silentSyn" postComponent="neuron_to_neuron_syn_x" weight="-0.600370319685173"/>
            <continuousConnectionInstanceW id="1" preCell="../PopVD/0/VD" postCell="../PopMD1/1/MD1" preComponent="silentSyn" postComponent="neuron_to_neuron_syn_x" weight="-0.585092472776176"/>
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        </continuousProjection>
        <continuousProjection id="NC_PopVA_PopMD1_silentSyn" presynapticPopulation="PopVA" postsynapticPopulation="PopMD1">
            <continuousConnectionInstanceW id="0" preCell="../PopVA/0/VA" postCell="../PopMD1/0/MD1" preComponent="silentSyn" postComponent="neuron_to_neuron_syn_x" weight="0.563168604507659"/>
            <continuousConnectionInstanceW id="1" preCell="../PopVA/0/VA" postCell="../PopMD1/1/MD1" preComponent="silentSyn" postComponent="neuron_to_neuron_syn_x" weight="0.548837443486686"/>
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        </continuousProjection>
        <continuousProjection id="NC_PopVB_PopMD1_silentSyn" presynapticPopulation="PopVB" postsynapticPopulation="PopMD1">
            <continuousConnectionInstanceW id="0" preCell="../PopVB/0/VB" postCell="../PopMD1/0/MD1" preComponent="silentSyn" postComponent="neuron_to_neuron_syn_x" weight="0.84"/>
            <continuousConnectionInstanceW id="1" preCell="../PopVB/0/VB" postCell="../PopMD1/1/MD1" preComponent="silentSyn" postComponent="neuron_to_neuron_syn_x" weight="0.818624207455347"/>
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        </continuousProjection>
        <continuousProjection id="NC_PopAS_PopAS_silentSyn" presynapticPopulation="PopAS" postsynapticPopulation="PopAS">
            <continuousConnectionInstanceW id="0" preCell="../PopAS/0/AS" postCell="../PopAS/0/AS" preComponent="silentSyn" postComponent="neuron_to_neuron_syn_x" weight="9.680923151515557"/>
            <continuousConnectionInstanceW id="1" preCell="../PopAS/1/AS" postCell="../PopAS/1/AS" preComponent="silentSyn" postComponent="neuron_to_neuron_syn_x" weight="9.680923151515557"/>
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        </continuousProjection>
        <continuousProjection id="NC_PopDB_PopAS_silentSyn" presynapticPopulation="PopDB" postsynapticPopulation="PopAS">
            <continuousConnectionInstanceW id="0" preCell="../PopDB/0/DB" postCell="../PopAS/0/AS" preComponent="silentSyn" postComponent="neuron_to_neuron_syn_x" weight="-13.284663324849728"/>
            <continuousConnectionInstanceW id="1" preCell="../PopDB/1/DB" postCell="../PopAS/1/AS" preComponent="silentSyn" postComponent="neuron_to_neuron_syn_x" weight="-13.284663324849728"/>
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        </continuousProjection>
        <continuousProjection id="NC_PopDA_PopDA_silentSyn" presynapticPopulation="PopDA" postsynapticPopulation="PopDA">
            <continuousConnectionInstanceW id="0" preCell="../PopDA/0/DA" postCell="../PopDA/0/DA" preComponent="silentSyn" postComponent="neuron_to_neuron_syn_x" weight="-0.138635010660755"/>
            <continuousConnectionInstanceW id="1" preCell="../PopDA/1/DA" postCell="../PopDA/1/DA" preComponent="silentSyn" postComponent="neuron_to_neuron_syn_x" weight="-0.138635010660755"/>
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        </continuousProjection>
        <continuousProjection id="NC_PopAS_PopDA_silentSyn" presynapticPopulation="PopAS" postsynapticPopulation="PopDA">
            <continuousConnectionInstanceW id="0" preCell="../PopAS/0/AS" postCell="../PopDA/0/DA" preComponent="silentSyn" postComponent="neuron_to_neuron_syn_x" weight="-13.370647326132525"/>
            <continuousConnectionInstanceW id="1" preCell="../PopAS/1/AS" postCell="../PopDA/1/DA" preComponent="silentSyn" postComponent="neuron_to_neuron_syn_x" weight="-13.370647326132525"/>
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        </continuousProjection>
        <continuousProjection id="NC_PopDB_PopDB_silentSyn" presynapticPopulation="PopDB" postsynapticPopulation="PopDB">
            <continuousConnectionInstanceW id="0" preCell="../PopDB/0/DB" postCell="../PopDB/0/DB" preComponent="silentSyn" postComponent="neuron_to_neuron_syn_x" weight="3.754764517249285"/>
            <continuousConnectionInstanceW id="1" preCell="../PopDB/1/DB" postCell="../PopDB/1/DB" preComponent="silentSyn" postComponent="neuron_to_neuron_syn_x" weight="3.754764517249285"/>
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        </continuousProjection>
        <continuousProjection id="NC_PopDA_PopDB_silentSyn" presynapticPopulation="PopDA" postsynapticPopulation="PopDB">
            <continuousConnectionInstanceW id="0" preCell="../PopDA/0/DA" postCell="../PopDB/0/DB" preComponent="silentSyn" postComponent="neuron_to_neuron_syn_x" weight="-14.880055712798304"/>
            <continuousConnectionInstanceW id="1" preCell="../PopDA/1/DA" postCell="../PopDB/1/DB" preComponent="silentSyn" postComponent="neuron_to_neuron_syn_x" weight="-14.880055712798304"/>
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        </continuousProjection>
        <continuousProjection id="NC_PopDD_PopDD_silentSyn" presynapticPopulation="PopDD" postsynapticPopulation="PopDD">
            <continuousConnectionInstanceW id="0" preCell="../PopDD/0/DD" postCell="../PopDD/0/DD" preComponent="silentSyn" postComponent="neuron_to_neuron_syn_x" weight="-1.816167389785238"/>
            <continuousConnectionInstanceW id="1" preCell="../PopDD/1/DD" postCell="../PopDD/1/DD" preComponent="silentSyn" postComponent="neuron_to_neuron_syn_x" weight="-1.816167389785238"/>
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        </continuousProjection>
        <continuousProjection id="NC_PopDA_PopDD_silentSyn" presynapticPopulation="PopDA" postsynapticPopulation="PopDD">
            <continuousConnectionInstanceW id="0" preCell="../PopDA/0/DA" postCell="../PopDD/0/DD" preComponent="silentSyn" postComponent="neuron_to_neuron_syn_x" weight="-1.949963116586537"/>
            <continuousConnectionInstanceW id="1" preCell="../PopDA/1/DA" postCell="../PopDD/1/DD" preComponent="silentSyn" postComponent="neuron_to_neuron_syn_x" weight="-1.949963116586537"/>
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        </continuousProjection>
        <continuousProjection id="NC_PopVB_PopDD_silentSyn" presynapticPopulation="PopVB" postsynapticPopulation="PopDD">
            <continuousConnectionInstanceW id="0" preCell="../PopVB/0/VB" postCell="../PopDD/0/DD" preComponent="silentSyn" postComponent="neuron_to_neuron_syn_x" weight="9.830215868882773"/>
            <continuousConnectionInstanceW id="1" preCell="../PopVB/1/VB" postCell="../PopDD/1/DD" preComponent="silentSyn" postComponent="neuron_to_neuron_syn_x" weight="9.830215868882773"/>
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        </continuousProjection>
        <continuousProjection id="NC_PopVA_PopDD_silentSyn" presynapticPopulation="PopVA" postsynapticPopulation="PopDD">
            <continuousConnectionInstanceW id="0" preCell="../PopVA/0/VA" postCell="../PopDD/0/DD" preComponent="silentSyn" postComponent="neuron_to_neuron_syn_x" weight="4.772101433987111"/>
            <continuousConnectionInstanceW id="1" preCell="../PopVA/1/VA" postCell="../PopDD/0/DD" preComponent="silentSyn" postComponent="neuron_to_neuron_syn_x" weight="12.029294258977179"/>
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        </continuousProjection>
        <continuousProjection id="NC_PopVD_PopVD_silentSyn" presynapticPopulation="PopVD" postsynapticPopulation="PopVD">
            <continuousConnectionInstanceW id="0" preCell="../PopVD/0/VD" postCell="../PopVD/0/VD" preComponent="silentSyn" postComponent="neuron_to_neuron_syn_x" weight="-7.513857757374462"/>
            <continuousConnectionInstanceW id="1" preCell="../PopVD/1/VD" postCell="../PopVD/1/VD" preComponent="silentSyn" postComponent="neuron_to_neuron_syn_x" weight="-7.513857757374462"/>
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        </continuousProjection>
        <continuousProjection id="NC_PopAS_PopVD_silentSyn" presynapticPopulation="PopAS" postsynapticPopulation="PopVD">
            <continuousConnectionInstanceW id="0" preCell="../PopAS/0/AS" postCell="../PopVD/0/VD" preComponent="silentSyn" postComponent="neuron_to_neuron_syn_x" weight="14.960926430100246"/>
            <continuousConnectionInstanceW id="1" preCell="../PopAS/1/AS" postCell="../PopVD/1/VD" preComponent="silentSyn" postComponent="neuron_to_neuron_syn_x" weight="14.960926430100246"/>
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        </continuousProjection>
        <continuousProjection id="NC_PopVB_PopVB_silentSyn" presynapticPopulation="PopVB" postsynapticPopulation="PopVB">
            <continuousConnectionInstanceW id="0" preCell="../PopVB/0/VB" postCell="../PopVB/0/VB" preComponent="silentSyn" postComponent="neuron_to_neuron_syn_x" weight="-9.475008482278923"/>
            <continuousConnectionInstanceW id="1" preCell="../PopVB/1/VB" postCell="../PopVB/1/VB" preComponent="silentSyn" postComponent="neuron_to_neuron_syn_x" weight="-9.475008482278923"/>
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        </continuousProjection>
        <continuousProjection id="NC_PopVD_PopVB_silentSyn" presynapticPopulation="PopVD" postsynapticPopulation="PopVB">
            <continuousConnectionInstanceW id="0" preCell="../PopVD/0/VD" postCell="../PopVB/0/VB" preComponent="silentSyn" postComponent="neuron_to_neuron_syn_x" weight="-8.133001982099486"/>
            <continuousConnectionInstanceW id="1" preCell="../PopVD/1/VD" postCell="../PopVB/1/VB" preComponent="silentSyn" postComponent="neuron_to_neuron_syn_x" weight="-8.133001982099486"/>
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        </continuousProjection>
        <continuousProjection id="NC_PopVA_PopVA_silentSyn" presynapticPopulation="PopVA" postsynapticPopulation="PopVA">
            <continuousConnectionInstanceW id="0" preCell="../PopVA/0/VA" postCell="../PopVA/0/VA" preComponent="silentSyn" postComponent="neuron_to_neuron_syn_x" weight="-0.600208490329953"/>
            <continuousConnectionInstanceW id="1" preCell="../PopVA/1/VA" postCell="../PopVA/1/VA" preComponent="silentSyn" postComponent="neuron_to_neuron_syn_x" weight="-0.600208490329953"/>
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        </continuousProjection>
        <continuousProjection id="NC_PopVD_PopVA_silentSyn" presynapticPopulation="PopVD" postsynapticPopulation="PopVA">
            <continuousConnectionInstanceW id="0" preCell="../PopVD/0/VD" postCell="../PopVA/0/VA" preComponent="silentSyn" postComponent="neuron_to_neuron_syn_x" weight="-6.719679883564599"/>
            <continuousConnectionInstanceW id="1" preCell="../PopVD/1/VD" postCell="../PopVA/1/VA" preComponent="silentSyn" postComponent="neuron_to_neuron_syn_x" weight="-6.719679883564599"/>
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        </continuousProjection>
        <continuousProjection id="NC_PopDB_PopDD_silentSyn" presynapticPopulation="PopDB" postsynapticPopulation="PopDD">
            <continuousConnectionInstanceW id="0" preCell="../PopDB/0/DB" postCell="../PopDD/1/DD" preComponent="silentSyn" postComponent="neuron_to_neuron_syn_x" weight="-14.934615973532601"/>
            <continuousConnectionInstanceW id="1" preCell="../PopDB/1/DB" postCell="../PopDD/2/DD" preComponent="silentSyn" postComponent="neuron_to_neuron_syn_x" weight="-14.934615973532601"/>
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        </continuousProjection>
        <inputList id="OneStim" population="PopDA" component="pulseGen_0">
            <inputW id="0" target="../PopDA/0/DA" destination="synapses" weight="1.0"/>
        </inputList>
        <inputList id="ExtStimPopAS" population="PopAS" component="extStim">
            <inputW id="0" target="../PopAS/0/AS" destination="synapses" weight="0.0"/>
            <inputW id="1" target="../PopAS/1/AS" destination="synapses" weight="0.0"/>
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        </inputList>
        <inputList id="ExtStimPopDA" population="PopDA" component="extStim">
            <inputW id="0" target="../PopDA/0/DA" destination="synapses" weight="0.0"/>
            <inputW id="1" target="../PopDA/1/DA" destination="synapses" weight="0.0"/>
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        </inputList>
        <inputList id="ExtStimPopDB" population="PopDB" component="extStim">
            <inputW id="0" target="../PopDB/0/DB" destination="synapses" weight="0.0"/>
            <inputW id="1" target="../PopDB/1/DB" destination="synapses" weight="0.0"/>
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        </inputList>
        <inputList id="ExtStimPopDD" population="PopDD" component="extStim">
            <inputW id="0" target="../PopDD/0/DD" destination="synapses" weight="0.0"/>
            <inputW id="1" target="../PopDD/1/DD" destination="synapses" weight="0.0"/>
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        </inputList>
        <inputList id="ExtStimPopVA" population="PopVA" component="extStim">
            <inputW id="0" target="../PopVA/0/VA" destination="synapses" weight="0.0"/>
            <inputW id="1" target="../PopVA/1/VA" destination="synapses" weight="0.0"/>
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        </inputList>
        <inputList id="ExtStimPopVB" population="PopVB" component="extStim">
            <inputW id="0" target="../PopVB/0/VB" destination="synapses" weight="0.0"/>
            <inputW id="1" target="../PopVB/1/VB" destination="synapses" weight="0.0"/>
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        </inputList>
        <inputList id="ExtStimPopVD" population="PopVD" component="extStim">
            <inputW id="0" target="../PopVD/0/VD" destination="synapses" weight="0.0"/>
            <inputW id="1" target="../PopVD/1/VD" destination="synapses" weight="0.0"/>
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        </inputList>
    </network>
</neuroml>
